// SBML level 2 version 3

model model()

  // Compartments:
  compartment GO_0005623 = 1;

  // Species:
  species $A_GO_0005623 in GO_0005623 = 1;
  species B_GO_0005623 in GO_0005623 = 10;
  species enzyme_reaction_0_GO_0005623 in GO_0005623 = 1; enzyme_reaction_0_GO_0005623 is "enzyme_enzyme_reaction_0";
  species C_GO_0005623 in GO_0005623 = 2;
  species enzyme_reaction_1_GO_0005623 in GO_0005623 = 4; enzyme_reaction_1_GO_0005623 is "enzyme_enzyme_reaction_1";
  species D_GO_0005623 in GO_0005623 = 1;
  species enzyme_reaction_2_GO_0005623 in GO_0005623 = 3; enzyme_reaction_2_GO_0005623 is "enzyme_enzyme_reaction_2";
  species $E_GO_0005623 in GO_0005623 = 1.5;
  species enzyme_reaction_3_GO_0005623 in GO_0005623 = 0.1; enzyme_reaction_3_GO_0005623 is "enzyme_enzyme_reaction_3";
  species $F_GO_0005623 in GO_0005623 = 2;
  species enzyme_reaction_4_GO_0005623 in GO_0005623 = 5; enzyme_reaction_4_GO_0005623 is "enzyme_enzyme_reaction_4";

  // Reactions:
  reaction_0: $A_GO_0005623 -> B_GO_0005623; enzyme_reaction_0_GO_0005623*k_f_reaction_0*A_GO_0005623 - k_b_reaction_0*B_GO_0005623;  // modifiers: enzyme_reaction_0_GO_0005623
    k_f_reaction_0 = 1; k_b_reaction_0 = 1;
  reaction_1: B_GO_0005623 -> C_GO_0005623; enzyme_reaction_1_GO_0005623*k_f_reaction_1*B_GO_0005623 - k_b_reaction_1*C_GO_0005623;  // modifiers: enzyme_reaction_1_GO_0005623
    k_f_reaction_1 = 1; k_b_reaction_1 = 1;
  reaction_2: B_GO_0005623 -> D_GO_0005623; enzyme_reaction_2_GO_0005623*k_f_reaction_2*B_GO_0005623 - k_b_reaction_2*D_GO_0005623;  // modifiers: enzyme_reaction_2_GO_0005623
    k_f_reaction_2 = 1; k_b_reaction_2 = 1;
  reaction_3: D_GO_0005623 -> $E_GO_0005623; enzyme_reaction_3_GO_0005623*k_f_reaction_3*D_GO_0005623 - k_b_reaction_3*E_GO_0005623;  // modifiers: enzyme_reaction_3_GO_0005623
    k_f_reaction_3 = 1; k_b_reaction_3 = 1;
  reaction_4: C_GO_0005623 -> $F_GO_0005623; enzyme_reaction_4_GO_0005623*k_f_reaction_4*C_GO_0005623 - k_b_reaction_4*F_GO_0005623;  // modifiers: enzyme_reaction_4_GO_0005623
    k_f_reaction_4 = 1; k_b_reaction_4 = 1;
end
