// SBML level 2 version 3

model model()

  // Compartments:
  compartment GO_0005623 = 1;  // GO:0005623

  // Species:
  species $Ex1_GO_0005623 in GO_0005623 = 2;
  species A_GO_0005623 in GO_0005623 = 1;
  species B_GO_0005623 in GO_0005623 = 1;
  species enzyme_reaction_1_GO_0005623 in GO_0005623 = 1; enzyme_reaction_1_GO_0005623 is "enzyme_enzyme_reaction_1";
  species C_GO_0005623 in GO_0005623 = 1;
  species enzyme_reaction_2_GO_0005623 in GO_0005623 = 1; enzyme_reaction_2_GO_0005623 is "enzyme_enzyme_reaction_2";
  species D_GO_0005623 in GO_0005623 = 1;
  species enzyme_reaction_3_GO_0005623 in GO_0005623 = 1; enzyme_reaction_3_GO_0005623 is "enzyme_enzyme_reaction_3";
  species E_GO_0005623 in GO_0005623 = 1;
  species enzyme_reaction_4_GO_0005623 in GO_0005623 = 1; enzyme_reaction_4_GO_0005623 is "enzyme_enzyme_reaction_4";
  species $Ex2_GO_0005623 in GO_0005623 = 1;
  species enzyme_reaction_5_GO_0005623 in GO_0005623 = 1; enzyme_reaction_5_GO_0005623 is "enzyme_enzyme_reaction_5";
  species F_GO_0005623 in GO_0005623 = 1;
  species enzyme_reaction_6_GO_0005623 in GO_0005623 = 1; enzyme_reaction_6_GO_0005623 is "enzyme_enzyme_reaction_6";
  species G_GO_0005623 in GO_0005623 = 1;
  species enzyme_reaction_7_GO_0005623 in GO_0005623 = 1; enzyme_reaction_7_GO_0005623 is "enzyme_enzyme_reaction_7";
  species $Ex3_GO_0005623 in GO_0005623 = 1;
  species enzyme_reaction_8_GO_0005623 in GO_0005623 = 1; enzyme_reaction_8_GO_0005623 is "enzyme_enzyme_reaction_8";

  // Reactions:
  reaction_0: $Ex1_GO_0005623 -> A_GO_0005623; 1*(k_f_reaction_0*Ex1_GO_0005623 - k_b_reaction_0*A_GO_0005623);
    k_f_reaction_0 = 2; k_b_reaction_0 = 1;
  reaction_1: A_GO_0005623 -> B_GO_0005623; enzyme_reaction_1_GO_0005623*(k_f_reaction_1*(A_GO_0005623/KM_reaction_1_A_GO_0005623) - k_b_reaction_1*(B_GO_0005623/KM_reaction_1_B_GO_0005623))/((1 + A_GO_0005623/KM_reaction_1_A_GO_0005623)*(1 + B_GO_0005623/KM_reaction_1_B_GO_0005623));  // modifiers: enzyme_reaction_1_GO_0005623
    k_f_reaction_1 = 2; k_b_reaction_1 = 1; KM_reaction_1_A_GO_0005623 = 1; KM_reaction_1_B_GO_0005623 = 1;
  reaction_2: B_GO_0005623 -> C_GO_0005623; enzyme_reaction_2_GO_0005623*(k_f_reaction_2*(B_GO_0005623/KM_reaction_2_B_GO_0005623) - k_b_reaction_2*(C_GO_0005623/KM_reaction_2_C_GO_0005623))/((1 + B_GO_0005623/KM_reaction_2_B_GO_0005623)*(1 + C_GO_0005623/KM_reaction_2_C_GO_0005623));  // modifiers: enzyme_reaction_2_GO_0005623
    k_f_reaction_2 = 2; k_b_reaction_2 = 1; KM_reaction_2_B_GO_0005623 = 1; KM_reaction_2_C_GO_0005623 = 1;
  reaction_3: C_GO_0005623 -> D_GO_0005623; enzyme_reaction_3_GO_0005623*(k_f_reaction_3*(C_GO_0005623/KM_reaction_3_C_GO_0005623) - k_b_reaction_3*(D_GO_0005623/KM_reaction_3_D_GO_0005623))/((1 + C_GO_0005623/KM_reaction_3_C_GO_0005623)*(1 + D_GO_0005623/KM_reaction_3_D_GO_0005623));  // modifiers: enzyme_reaction_3_GO_0005623
    k_f_reaction_3 = 2; k_b_reaction_3 = 1; KM_reaction_3_C_GO_0005623 = 1; KM_reaction_3_D_GO_0005623 = 1;
  reaction_4: D_GO_0005623 -> E_GO_0005623; enzyme_reaction_4_GO_0005623*(k_f_reaction_4*(D_GO_0005623/KM_reaction_4_D_GO_0005623) - k_b_reaction_4*(E_GO_0005623/KM_reaction_4_E_GO_0005623))/((1 + D_GO_0005623/KM_reaction_4_D_GO_0005623)*(1 + E_GO_0005623/KM_reaction_4_E_GO_0005623));  // modifiers: enzyme_reaction_4_GO_0005623
    k_f_reaction_4 = 2; k_b_reaction_4 = 1; KM_reaction_4_D_GO_0005623 = 1; KM_reaction_4_E_GO_0005623 = 1;
  reaction_5: E_GO_0005623 -> $Ex2_GO_0005623; 1*(k_f_reaction_5*E_GO_0005623 - k_b_reaction_5*Ex2_GO_0005623);
    k_f_reaction_5 = 2; k_b_reaction_5 = 1;
  reaction_6: C_GO_0005623 -> F_GO_0005623; enzyme_reaction_6_GO_0005623*(k_f_reaction_6*(C_GO_0005623/KM_reaction_6_C_GO_0005623) - k_b_reaction_6*(F_GO_0005623/KM_reaction_6_F_GO_0005623))/((1 + C_GO_0005623/KM_reaction_6_C_GO_0005623)*(1 + F_GO_0005623/KM_reaction_6_F_GO_0005623));  // modifiers: enzyme_reaction_6_GO_0005623
    k_f_reaction_6 = 2; k_b_reaction_6 = 1; KM_reaction_6_C_GO_0005623 = 1; KM_reaction_6_F_GO_0005623 = 1;
  reaction_7: F_GO_0005623 -> G_GO_0005623; enzyme_reaction_7_GO_0005623*(k_f_reaction_7*(F_GO_0005623/KM_reaction_7_F_GO_0005623) - k_b_reaction_7*(G_GO_0005623/KM_reaction_7_G_GO_0005623))/((1 + F_GO_0005623/KM_reaction_7_F_GO_0005623)*(1 + G_GO_0005623/KM_reaction_7_G_GO_0005623));  // modifiers: enzyme_reaction_7_GO_0005623
    k_f_reaction_7 = 2; k_b_reaction_7 = 1; KM_reaction_7_F_GO_0005623 = 1; KM_reaction_7_G_GO_0005623 = 1;
  reaction_8: G_GO_0005623 -> $Ex3_GO_0005623; 1*(k_f_reaction_8*G_GO_0005623 - k_b_reaction_8*Ex3_GO_0005623);
    k_f_reaction_8 = 2; k_b_reaction_8 = 1;
end
