// SBML level 2 version 3

model model()

  // Compartments:
  compartment GO_0005623 = 1;  // GO:0005623

  // Species:
  species Ex1_GO_0005623 in GO_0005623 = 1;
  species A_GO_0005623 in GO_0005623 = 1;
  species enzyme_reaction_0_GO_0005623 in GO_0005623 = 0; enzyme_reaction_0_GO_0005623 is "enzyme_enzyme_reaction_0";
  species B_GO_0005623 in GO_0005623 = 1;
  species enzyme_reaction_1_GO_0005623 in GO_0005623 = 0; enzyme_reaction_1_GO_0005623 is "enzyme_enzyme_reaction_1";
  species C_GO_0005623 in GO_0005623 = 1;
  species enzyme_reaction_2_GO_0005623 in GO_0005623 = 0; enzyme_reaction_2_GO_0005623 is "enzyme_enzyme_reaction_2";
  species D_GO_0005623 in GO_0005623 = 1;
  species enzyme_reaction_3_GO_0005623 in GO_0005623 = 0; enzyme_reaction_3_GO_0005623 is "enzyme_enzyme_reaction_3";
  species E_GO_0005623 in GO_0005623 = 1;
  species enzyme_reaction_4_GO_0005623 in GO_0005623 = 0; enzyme_reaction_4_GO_0005623 is "enzyme_enzyme_reaction_4";
  species Ex2_GO_0005623 in GO_0005623 = 1;
  species enzyme_reaction_5_GO_0005623 in GO_0005623 = 0; enzyme_reaction_5_GO_0005623 is "enzyme_enzyme_reaction_5";
  species F_GO_0005623 in GO_0005623 = 1;
  species enzyme_reaction_6_GO_0005623 in GO_0005623 = 0; enzyme_reaction_6_GO_0005623 is "enzyme_enzyme_reaction_6";
  species G_GO_0005623 in GO_0005623 = 1;
  species enzyme_reaction_7_GO_0005623 in GO_0005623 = 0; enzyme_reaction_7_GO_0005623 is "enzyme_enzyme_reaction_7";
  species Ex3_GO_0005623 in GO_0005623 = 1;
  species enzyme_reaction_8_GO_0005623 in GO_0005623 = 0; enzyme_reaction_8_GO_0005623 is "enzyme_enzyme_reaction_8";

  // Reactions:
  reaction_0: Ex1_GO_0005623 -> A_GO_0005623; enzyme_reaction_0_GO_0005623*(k_f_reaction_0*Ex1_GO_0005623 - k_b_reaction_0*A_GO_0005623);  // modifiers: enzyme_reaction_0_GO_0005623
    k_f_reaction_0 = NaN; k_b_reaction_0 = NaN;
  reaction_1: A_GO_0005623 -> B_GO_0005623; enzyme_reaction_1_GO_0005623*(k_f_reaction_1*A_GO_0005623 - k_b_reaction_1*B_GO_0005623);  // modifiers: enzyme_reaction_1_GO_0005623
    k_f_reaction_1 = NaN; k_b_reaction_1 = NaN;
  reaction_2: B_GO_0005623 -> C_GO_0005623; enzyme_reaction_2_GO_0005623*(k_f_reaction_2*B_GO_0005623 - k_b_reaction_2*C_GO_0005623);  // modifiers: enzyme_reaction_2_GO_0005623
    k_f_reaction_2 = NaN; k_b_reaction_2 = NaN;
  reaction_3: C_GO_0005623 -> D_GO_0005623; enzyme_reaction_3_GO_0005623*(k_f_reaction_3*C_GO_0005623 - k_b_reaction_3*D_GO_0005623);  // modifiers: enzyme_reaction_3_GO_0005623
    k_f_reaction_3 = NaN; k_b_reaction_3 = NaN;
  reaction_4: D_GO_0005623 -> E_GO_0005623; enzyme_reaction_4_GO_0005623*(k_f_reaction_4*D_GO_0005623 - k_b_reaction_4*E_GO_0005623);  // modifiers: enzyme_reaction_4_GO_0005623
    k_f_reaction_4 = NaN; k_b_reaction_4 = NaN;
  reaction_5: E_GO_0005623 -> Ex2_GO_0005623; enzyme_reaction_5_GO_0005623*(k_f_reaction_5*E_GO_0005623 - k_b_reaction_5*Ex2_GO_0005623);  // modifiers: enzyme_reaction_5_GO_0005623
    k_f_reaction_5 = NaN; k_b_reaction_5 = NaN;
  reaction_6: C_GO_0005623 -> F_GO_0005623; enzyme_reaction_6_GO_0005623*(k_f_reaction_6*C_GO_0005623 - k_b_reaction_6*F_GO_0005623);  // modifiers: enzyme_reaction_6_GO_0005623
    k_f_reaction_6 = NaN; k_b_reaction_6 = NaN;
  reaction_7: F_GO_0005623 -> G_GO_0005623; enzyme_reaction_7_GO_0005623*(k_f_reaction_7*F_GO_0005623 - k_b_reaction_7*G_GO_0005623);  // modifiers: enzyme_reaction_7_GO_0005623
    k_f_reaction_7 = NaN; k_b_reaction_7 = NaN;
  reaction_8: G_GO_0005623 -> Ex3_GO_0005623; enzyme_reaction_8_GO_0005623*(k_f_reaction_8*G_GO_0005623 - k_b_reaction_8*Ex3_GO_0005623);  // modifiers: enzyme_reaction_8_GO_0005623
    k_f_reaction_8 = NaN; k_b_reaction_8 = NaN;
end
