// SBML level 2 version 3

function function_4_reaction_1(C_comp0, D_comp0, comp0, k1)
  k1*D_comp0*C_comp0/comp0;
end

function function_4_reaction_0(A_comp0, B_comp0, comp0, k1)
  k1*A_comp0*B_comp0/comp0;
end

model NoName()

  // Compartments:
  compartment comp0 = 1;

  // Species:
  species A_comp0 in comp0 = 1;
  species $B_comp0 in comp0 = 1;
  species C_comp0 in comp0 = 1;
  species D_comp0 in comp0 = 1;

  // Reactions:
  reaction_0: A_comp0 + $B_comp0 -> C_comp0; comp0*function_4_reaction_0(A_comp0, B_comp0, comp0, reaction_0_k1);
    reaction_0_k1 = 0.1;
  reaction_1: C_comp0 + D_comp0 -> A_comp0; comp0*function_4_reaction_1(C_comp0, D_comp0, comp0, reaction_1_k1);
    reaction_1_k1 = 0.1;
end
