// SBML level 2 version 4

function Constant_flux_irreversible(v)
  v;
end
Constant_flux_irreversible is "Constant flux (irreversible)";

model Model_1()
  // example

  // Compartments:
  compartment compartment_1 = 1;

  // Species:
  species S1 in compartment_1 = 1.66;
  species S2 in compartment_1 = 2;

  // Parameters:
  v0 = 4;
  k1 = 3;
  k_1 = 0.5;
  k2 = 2;

  // Reactions:
  re1: => S1; compartment_1*Constant_flux_irreversible(v0);
  reaction_2: S1 => S2; compartment_1*k1*S1; reaction_2 is "reaction_1";
  reaction_3: S2 => S1; compartment_1*k_1*S2; reaction_3 is "reaction_2";
  reaction_4: S2 => ; compartment_1*k2*S2; reaction_4 is "reaction_3";

  // Unit definitions:
  unit volume = 1e-3 litre;
  unit substance = 1e-3 mole;
end
