// SBML level 2 version 3

model model()

  // Compartments:
  compartment c = 1;

  // Species:
  species $A_c in c = 3;
  species B_c in c = 1;
  species enzyme_reaction_0_c in c = 2; enzyme_reaction_0_c is "enzyme_enzyme_reaction_0";
  species C_c in c = 4;
  species enzyme_reaction_1_c in c = 2; enzyme_reaction_1_c is "enzyme_enzyme_reaction_1";
  species D_c in c = 2;
  species enzyme_reaction_2_c in c = 2; enzyme_reaction_2_c is "enzyme_enzyme_reaction_2";
  species $E_c in c = 3;
  species enzyme_reaction_3_c in c = 2; enzyme_reaction_3_c is "enzyme_enzyme_reaction_3";
  species F_c in c = 1;
  species enzyme_reaction_4_c in c = 2; enzyme_reaction_4_c is "enzyme_enzyme_reaction_4";
  species $G_c in c = 3;
  species enzyme_reaction_5_c in c = 2; enzyme_reaction_5_c is "enzyme_enzyme_reaction_5";

  // Reactions:
  reaction_0: $A_c -> B_c; enzyme_reaction_0_c*(k_f_reaction_0*(A_c/KM_reaction_0_A_c) - k_b_reaction_0*(B_c/KM_reaction_0_B_c))/((1 + A_c/KM_reaction_0_A_c)*(1 + B_c/KM_reaction_0_B_c));  // modifiers: enzyme_reaction_0_c
    k_f_reaction_0 = 16; k_b_reaction_0 = 8; KM_reaction_0_A_c = 3; KM_reaction_0_B_c = 3;
  reaction_1: B_c -> C_c; enzyme_reaction_1_c*(k_f_reaction_1*(B_c/KM_reaction_1_B_c) - k_b_reaction_1*(C_c/KM_reaction_1_C_c))/((1 + B_c/KM_reaction_1_B_c)*(1 + C_c/KM_reaction_1_C_c));  // modifiers: enzyme_reaction_1_c
    k_f_reaction_1 = 16; k_b_reaction_1 = 8; KM_reaction_1_B_c = 3; KM_reaction_1_C_c = 3;
  reaction_2: C_c -> D_c; enzyme_reaction_2_c*(k_f_reaction_2*(C_c/KM_reaction_2_C_c) - k_b_reaction_2*(D_c/KM_reaction_2_D_c))/((1 + C_c/KM_reaction_2_C_c)*(1 + D_c/KM_reaction_2_D_c));  // modifiers: enzyme_reaction_2_c
    k_f_reaction_2 = 8; k_b_reaction_2 = 4; KM_reaction_2_C_c = 3; KM_reaction_2_D_c = 3;
  reaction_3: D_c -> $E_c; enzyme_reaction_3_c*(k_f_reaction_3*(D_c/KM_reaction_3_D_c) - k_b_reaction_3*(E_c/KM_reaction_3_E_c))/((1 + D_c/KM_reaction_3_D_c)*(1 + E_c/KM_reaction_3_E_c));  // modifiers: enzyme_reaction_3_c
    k_f_reaction_3 = 8; k_b_reaction_3 = 4; KM_reaction_3_D_c = 3; KM_reaction_3_E_c = 3;
  reaction_4: C_c -> F_c; enzyme_reaction_4_c*(k_f_reaction_4*(C_c/KM_reaction_4_C_c) - k_b_reaction_4*(F_c/KM_reaction_4_F_c))/((1 + C_c/KM_reaction_4_C_c)*(1 + F_c/KM_reaction_4_F_c));  // modifiers: enzyme_reaction_4_c
    k_f_reaction_4 = 8; k_b_reaction_4 = 4; KM_reaction_4_C_c = 3; KM_reaction_4_F_c = 3;
  reaction_5: F_c -> $G_c; enzyme_reaction_5_c*(k_f_reaction_5*(F_c/KM_reaction_5_F_c) - k_b_reaction_5*(G_c/KM_reaction_5_G_c))/((1 + F_c/KM_reaction_5_F_c)*(1 + G_c/KM_reaction_5_G_c));  // modifiers: enzyme_reaction_5_c
    k_f_reaction_5 = 8; k_b_reaction_5 = 4; KM_reaction_5_F_c = 3; KM_reaction_5_G_c = 3;
end
