// SBML level 2 version 3

model model()

  // Compartments:
  compartment c = 1;

  // Species:
  species $A_c in c = 1;
  species B_c in c = 1;
  species enzyme_reaction_0_c in c = 1; enzyme_reaction_0_c is "enzyme_enzyme_reaction_0";
  species C_c in c = 1;
  species enzyme_reaction_1_c in c = 1; enzyme_reaction_1_c is "enzyme_enzyme_reaction_1";
  species D_c in c = 1;
  species enzyme_reaction_2_c in c = 1; enzyme_reaction_2_c is "enzyme_enzyme_reaction_2";
  species $E_c in c = 1;
  species enzyme_reaction_3_c in c = 1; enzyme_reaction_3_c is "enzyme_enzyme_reaction_3";
  species F_c in c = 1;
  species enzyme_reaction_4_c in c = 1; enzyme_reaction_4_c is "enzyme_enzyme_reaction_4";
  species $G_c in c = 1;
  species enzyme_reaction_5_c in c = 1; enzyme_reaction_5_c is "enzyme_enzyme_reaction_5";

  // Reactions:
  reaction_0: $A_c -> B_c; enzyme_reaction_0_c*(k_f_reaction_0*A_c - k_b_reaction_0*B_c);  // modifiers: enzyme_reaction_0_c
    k_f_reaction_0 = 3; k_b_reaction_0 = 1;
  reaction_1: B_c -> C_c; enzyme_reaction_1_c*(k_f_reaction_1*B_c - k_b_reaction_1*C_c);  // modifiers: enzyme_reaction_1_c
    k_f_reaction_1 = 3; k_b_reaction_1 = 1;
  reaction_2: C_c -> D_c; enzyme_reaction_2_c*(k_f_reaction_2*C_c - k_b_reaction_2*D_c);  // modifiers: enzyme_reaction_2_c
    k_f_reaction_2 = 2; k_b_reaction_2 = 1;
  reaction_3: D_c -> $E_c; enzyme_reaction_3_c*(k_f_reaction_3*D_c - k_b_reaction_3*E_c);  // modifiers: enzyme_reaction_3_c
    k_f_reaction_3 = 2; k_b_reaction_3 = 1;
  reaction_4: C_c -> F_c; enzyme_reaction_4_c*(k_f_reaction_4*C_c - k_b_reaction_4*F_c);  // modifiers: enzyme_reaction_4_c
    k_f_reaction_4 = 2; k_b_reaction_4 = 1;
  reaction_5: F_c -> $G_c; enzyme_reaction_5_c*(k_f_reaction_5*F_c - k_b_reaction_5*G_c);  // modifiers: enzyme_reaction_5_c
    k_f_reaction_5 = 2; k_b_reaction_5 = 1;
end
