// SBML level 2 version 3

model model()

  // Compartments:
  compartment GO_0005623 = 1;

  // Species:
  species $A_GO_0005623 in GO_0005623 = 1;
  species $B_GO_0005623 in GO_0005623 = 2;
  species C_GO_0005623 in GO_0005623 = 3;
  species enzyme_reaction_0_GO_0005623 in GO_0005623 = 1; enzyme_reaction_0_GO_0005623 is "enzyme_enzyme_reaction_0";
  species D_GO_0005623 in GO_0005623 = 4;
  species enzyme_reaction_1_GO_0005623 in GO_0005623 = 1; enzyme_reaction_1_GO_0005623 is "enzyme_enzyme_reaction_1";

  // Reactions:
  reaction_0: 2 $A_GO_0005623 + 2 $B_GO_0005623 -> 3 C_GO_0005623; enzyme_reaction_0_GO_0005623*k_f_reaction_0*A_GO_0005623^2*B_GO_0005623^2 - k_b_reaction_0*C_GO_0005623^3;  // modifiers: enzyme_reaction_0_GO_0005623
    k_f_reaction_0 = 1; k_b_reaction_0 = 1;
  reaction_1: C_GO_0005623 -> 4 D_GO_0005623; enzyme_reaction_1_GO_0005623*k_f_reaction_1*C_GO_0005623 - k_b_reaction_1*D_GO_0005623^4;  // modifiers: enzyme_reaction_1_GO_0005623
    k_f_reaction_1 = 1; k_b_reaction_1 = 1;
end
