// SBML level 2 version 3

model model()

  // Compartments:
  compartment GO_0005623 = 1;  // GO:0005623

  // Species:
  species $A_GO_0005623 in GO_0005623 = 4;
  species B_GO_0005623 in GO_0005623 = 3;
  species C_GO_0005623 in GO_0005623 = 2.5;
  species enzyme_reaction_1_GO_0005623 in GO_0005623 = 6.627443; enzyme_reaction_1_GO_0005623 is "enzyme_enzyme_reaction_1";
  species D_GO_0005623 in GO_0005623 = 2;
  species enzyme_reaction_2_GO_0005623 in GO_0005623 = 5.411285; enzyme_reaction_2_GO_0005623 is "enzyme_enzyme_reaction_2";
  species E_GO_0005623 in GO_0005623 = 1.5;
  species enzyme_reaction_3_GO_0005623 in GO_0005623 = 4.191563; enzyme_reaction_3_GO_0005623 is "enzyme_enzyme_reaction_3";
  species $F_GO_0005623 in GO_0005623 = 1;

  // Reactions:
  reaction_0: $A_GO_0005623 -> B_GO_0005623; k_f_reaction_0*A_GO_0005623 - k_b_reaction_0*B_GO_0005623;
    k_f_reaction_0 = 0.1; k_b_reaction_0 = 0.1;
  reaction_1: B_GO_0005623 -> C_GO_0005623; enzyme_reaction_1_GO_0005623*(k_f_reaction_1*(B_GO_0005623/KM_reaction_1_B_GO_0005623) - k_b_reaction_1*(C_GO_0005623/KM_reaction_1_C_GO_0005623))/((1 + B_GO_0005623/KM_reaction_1_B_GO_0005623)*(1 + C_GO_0005623/KM_reaction_1_C_GO_0005623));  // modifiers: enzyme_reaction_1_GO_0005623
    k_f_reaction_1 = 1.095445; k_b_reaction_1 = 0.9128709; KM_reaction_1_B_GO_0005623 = 0.3; KM_reaction_1_C_GO_0005623 = 0.25;
  reaction_2: C_GO_0005623 -> D_GO_0005623; enzyme_reaction_2_GO_0005623*(k_f_reaction_2*(C_GO_0005623/KM_reaction_2_C_GO_0005623) - k_b_reaction_2*(D_GO_0005623/KM_reaction_2_D_GO_0005623))/((1 + C_GO_0005623/KM_reaction_2_C_GO_0005623)*(1 + D_GO_0005623/KM_reaction_2_D_GO_0005623));  // modifiers: enzyme_reaction_2_GO_0005623
    k_f_reaction_2 = 1.118034; k_b_reaction_2 = 0.8944272; KM_reaction_2_C_GO_0005623 = 0.25; KM_reaction_2_D_GO_0005623 = 0.2;
  reaction_3: D_GO_0005623 -> E_GO_0005623; enzyme_reaction_3_GO_0005623*(k_f_reaction_3*(D_GO_0005623/KM_reaction_3_D_GO_0005623) - k_b_reaction_3*(E_GO_0005623/KM_reaction_3_E_GO_0005623))/((1 + D_GO_0005623/KM_reaction_3_D_GO_0005623)*(1 + E_GO_0005623/KM_reaction_3_E_GO_0005623));  // modifiers: enzyme_reaction_3_GO_0005623
    k_f_reaction_3 = 1.154701; k_b_reaction_3 = 0.8660254; KM_reaction_3_D_GO_0005623 = 0.2; KM_reaction_3_E_GO_0005623 = 0.15;
  reaction_4: E_GO_0005623 -> $F_GO_0005623; k_f_reaction_4*E_GO_0005623 - k_b_reaction_4*F_GO_0005623;
    k_f_reaction_4 = 0.2; k_b_reaction_4 = 0.2;
end
