// SBML level 2 version 3

model model()

  // Compartments:
  compartment GO_0005623 = 1;  // GO:0005623

  // Species:
  species B_GO_0005623 in GO_0005623 = 9;
  species C_GO_0005623 in GO_0005623 = 11;
  species enzyme_reaction_0_GO_0005623 in GO_0005623 = 1; enzyme_reaction_0_GO_0005623 is "enzyme_enzyme_reaction_0";
  species $D_GO_0005623 in GO_0005623 = 10;
  species enzyme_reaction_1_GO_0005623 in GO_0005623 = 1; enzyme_reaction_1_GO_0005623 is "enzyme_enzyme_reaction_1";
  species $A_GO_0005623 in GO_0005623 = 10;
  species enzyme_reaction_2_GO_0005623 in GO_0005623 = 1; enzyme_reaction_2_GO_0005623 is "enzyme_enzyme_reaction_2";

  // Reactions:
  reaction_0: B_GO_0005623 -> C_GO_0005623; enzyme_reaction_0_GO_0005623*(k_f_reaction_0*B_GO_0005623 - k_b_reaction_0*C_GO_0005623);  // modifiers: enzyme_reaction_0_GO_0005623
    k_f_reaction_0 = 1; k_b_reaction_0 = 1;
  reaction_1: C_GO_0005623 -> 2 $D_GO_0005623; enzyme_reaction_1_GO_0005623*(k_f_reaction_1*C_GO_0005623 - k_b_reaction_1*D_GO_0005623^2);  // modifiers: enzyme_reaction_1_GO_0005623
    k_f_reaction_1 = 2; k_b_reaction_1 = 2;
  reaction_2: 2 $A_GO_0005623 -> B_GO_0005623; enzyme_reaction_2_GO_0005623*(k_f_reaction_2*A_GO_0005623^2 - k_b_reaction_2*B_GO_0005623);  // modifiers: enzyme_reaction_2_GO_0005623
    k_f_reaction_2 = 1; k_b_reaction_2 = 1;
end
