// SBML level 2 version 3

model kegg2sbml()

  // Compartments:
  compartment comp0 = 1;

  // Species:
  species C00890_comp0 in comp0 = 0.1; C00890_comp0 is "Polyphosphate";
  species C00001_comp0 in comp0 = 0.1; C00001_comp0 is "H2O";
  species C02174_comp0 in comp0 = 0.1; C02174_comp0 is "Oligophosphate";
  species C00002_comp0 in comp0 = 0.1; C00002_comp0 is "ATP";
  species C05359_comp0 in comp0 = 0.1; C05359_comp0 is "e_";
  species C00080_comp0 in comp0 = 0.1; C00080_comp0 is "H+";
  species C00009_comp0 in comp0 = 0.1; C00009_comp0 is "Orthophosphate";
  species C00008_comp0 in comp0 = 0.1; C00008_comp0 is "ADP";
  species C00013_comp0 in comp0 = 0.1; C00013_comp0 is "Pyrophosphate";
  species C01010_comp0 in comp0 = 0.1; C01010_comp0 is "Urea_1_carboxylate";
  species C00011_comp0 in comp0 = 0.1; C00011_comp0 is "CO2";
  species C00014_comp0 in comp0 = 0.1; C00014_comp0 is "NH3";
  species enzyme_R00001 in comp0 = 0.00016659;
  species enzyme_R00002 in comp0 = 0.00016659;
  species enzyme_R00004 in comp0 = 7.3075e-5;
  species enzyme_R00005 in comp0 = 0.00016659;

  // Parameters:
  KG_C00890_comp0 = -116.13;
  KG_C00001_comp0 = -219.91;
  KG_C02174_comp0 = -335.87;
  KG_C00002_comp0 = -310.21;
  KG_C05359_comp0 = -183.9;
  KG_C00080_comp0 = -183.9;
  KG_C00009_comp0 = -204.43;
  KG_C00008_comp0 = -141.79;
  KG_C00013_comp0 = -194.68;
  KG_C01010_comp0 = -276.89;
  KG_C00011_comp0 = -124.22;
  KG_C00014_comp0 = -124.22;

  // Reactions:
  R00001: C00890_comp0 + C00001_comp0 -> C02174_comp0; enzyme_R00001*(R00001_kcatf*(C00890_comp0/KM_C00890_comp0)*(C00001_comp0/R00001_KM_C00001_comp0) - C02174_comp0/KM_C02174_comp0*R00001_kcatb)/((1 + C00890_comp0/KM_C00890_comp0)*(1 + C00001_comp0/R00001_KM_C00001_comp0) + 1 + C02174_comp0/KM_C02174_comp0 - 1);  // modifiers: enzyme_R00001
    R00001_KV = 4.953; R00001_kcatf = 4.795619; R00001_kcatb = 5.115546; KM_C00890_comp0 = 0.16999; R00001_KM_C00001_comp0 = 0.16999; KM_C02174_comp0 = 0.16999;
  R00002: 16 C00002_comp0 + 16 C00001_comp0 -> 8 C05359_comp0 + 8 C00080_comp0 + 16 C00009_comp0 + 16 C00008_comp0; enzyme_R00002*(R00002_kcatf*(C00002_comp0/KM_C00002_comp0)^16*(C00001_comp0/R00002_KM_C00001_comp0)^16 - (C05359_comp0/KM_C05359_comp0)^16*(C00080_comp0/KM_C00080_comp0)^16*(C00009_comp0/R00002_KM_C00009_comp0)^16*(C00008_comp0/KM_C00008_comp0)^16*R00002_kcatb)/((1 + C00002_comp0/KM_C00002_comp0 + (C00002_comp0/KM_C00002_comp0)^2 + (C00002_comp0/KM_C00002_comp0)^3 + (C00002_comp0/KM_C00002_comp0)^4 + (C00002_comp0/KM_C00002_comp0)^5 + (C00002_comp0/KM_C00002_comp0)^6 + (C00002_comp0/KM_C00002_comp0)^7 + (C00002_comp0/KM_C00002_comp0)^8 + (C00002_comp0/KM_C00002_comp0)^9 + (C00002_comp0/KM_C00002_comp0)^10 + (C00002_comp0/KM_C00002_comp0)^11 + (C00002_comp0/KM_C00002_comp0)^12 + (C00002_comp0/KM_C00002_comp0)^13 + (C00002_comp0/KM_C00002_comp0)^14 + (C00002_comp0/KM_C00002_comp0)^15 + (C00002_comp0/KM_C00002_comp0)^16)*(1 + C00001_comp0/R00002_KM_C00001_comp0 + (C00001_comp0/R00002_KM_C00001_comp0)^2 + (C00001_comp0/R00002_KM_C00001_comp0)^3 + (C00001_comp0/R00002_KM_C00001_comp0)^4 + (C00001_comp0/R00002_KM_C00001_comp0)^5 + (C00001_comp0/R00002_KM_C00001_comp0)^6 + (C00001_comp0/R00002_KM_C00001_comp0)^7 + (C00001_comp0/R00002_KM_C00001_comp0)^8 + (C00001_comp0/R00002_KM_C00001_comp0)^9 + (C00001_comp0/R00002_KM_C00001_comp0)^10 + (C00001_comp0/R00002_KM_C00001_comp0)^11 + (C00001_comp0/R00002_KM_C00001_comp0)^12 + (C00001_comp0/R00002_KM_C00001_comp0)^13 + (C00001_comp0/R00002_KM_C00001_comp0)^14 + (C00001_comp0/R00002_KM_C00001_comp0)^15 + (C00001_comp0/R00002_KM_C00001_comp0)^16) + (1 + C05359_comp0/KM_C05359_comp0 + (C05359_comp0/KM_C05359_comp0)^2 + (C05359_comp0/KM_C05359_comp0)^3 + (C05359_comp0/KM_C05359_comp0)^4 + (C05359_comp0/KM_C05359_comp0)^5 + (C05359_comp0/KM_C05359_comp0)^6 + (C05359_comp0/KM_C05359_comp0)^7 + (C05359_comp0/KM_C05359_comp0)^8 + (C05359_comp0/KM_C05359_comp0)^9 + (C05359_comp0/KM_C05359_comp0)^10 + (C05359_comp0/KM_C05359_comp0)^11 + (C05359_comp0/KM_C05359_comp0)^12 + (C05359_comp0/KM_C05359_comp0)^13 + (C05359_comp0/KM_C05359_comp0)^14 + (C05359_comp0/KM_C05359_comp0)^15 + (C05359_comp0/KM_C05359_comp0)^16)*(1 + C00080_comp0/KM_C00080_comp0 + (C00080_comp0/KM_C00080_comp0)^2 + (C00080_comp0/KM_C00080_comp0)^3 + (C00080_comp0/KM_C00080_comp0)^4 + (C00080_comp0/KM_C00080_comp0)^5 + (C00080_comp0/KM_C00080_comp0)^6 + (C00080_comp0/KM_C00080_comp0)^7 + (C00080_comp0/KM_C00080_comp0)^8 + (C00080_comp0/KM_C00080_comp0)^9 + (C00080_comp0/KM_C00080_comp0)^10 + (C00080_comp0/KM_C00080_comp0)^11 + (C00080_comp0/KM_C00080_comp0)^12 + (C00080_comp0/KM_C00080_comp0)^13 + (C00080_comp0/KM_C00080_comp0)^14 + (C00080_comp0/KM_C00080_comp0)^15 + (C00080_comp0/KM_C00080_comp0)^16)*(1 + C00009_comp0/R00002_KM_C00009_comp0 + (C00009_comp0/R00002_KM_C00009_comp0)^2 + (C00009_comp0/R00002_KM_C00009_comp0)^3 + (C00009_comp0/R00002_KM_C00009_comp0)^4 + (C00009_comp0/R00002_KM_C00009_comp0)^5 + (C00009_comp0/R00002_KM_C00009_comp0)^6 + (C00009_comp0/R00002_KM_C00009_comp0)^7 + (C00009_comp0/R00002_KM_C00009_comp0)^8 + (C00009_comp0/R00002_KM_C00009_comp0)^9 + (C00009_comp0/R00002_KM_C00009_comp0)^10 + (C00009_comp0/R00002_KM_C00009_comp0)^11 + (C00009_comp0/R00002_KM_C00009_comp0)^12 + (C00009_comp0/R00002_KM_C00009_comp0)^13 + (C00009_comp0/R00002_KM_C00009_comp0)^14 + (C00009_comp0/R00002_KM_C00009_comp0)^15 + (C00009_comp0/R00002_KM_C00009_comp0)^16)*(1 + C00008_comp0/KM_C00008_comp0 + (C00008_comp0/KM_C00008_comp0)^2 + (C00008_comp0/KM_C00008_comp0)^3 + (C00008_comp0/KM_C00008_comp0)^4 + (C00008_comp0/KM_C00008_comp0)^5 + (C00008_comp0/KM_C00008_comp0)^6 + (C00008_comp0/KM_C00008_comp0)^7 + (C00008_comp0/KM_C00008_comp0)^8 + (C00008_comp0/KM_C00008_comp0)^9 + (C00008_comp0/KM_C00008_comp0)^10 + (C00008_comp0/KM_C00008_comp0)^11 + (C00008_comp0/KM_C00008_comp0)^12 + (C00008_comp0/KM_C00008_comp0)^13 + (C00008_comp0/KM_C00008_comp0)^14 + (C00008_comp0/KM_C00008_comp0)^15 + (C00008_comp0/KM_C00008_comp0)^16) - 1);  // modifiers: enzyme_R00002
    R00002_KV = 4.953; R00002_kcatf = 4.960671; R00002_kcatb = 4.945341; KM_C00002_comp0 = 0.16999; R00002_KM_C00001_comp0 = 0.16999; KM_C05359_comp0 = 0.16999; KM_C00080_comp0 = 0.16999; R00002_KM_C00009_comp0 = 0.16999; KM_C00008_comp0 = 0.16999;
  R00004: C00013_comp0 + C00001_comp0 -> 2 C00009_comp0; enzyme_R00004*(R00004_kcatf*(C00013_comp0/KM_C00013_comp0)*(C00001_comp0/R00004_KM_C00001_comp0) - C00009_comp0/R00004_KM_C00009_comp0*R00004_kcatb)/((1 + C00013_comp0/KM_C00013_comp0)*(1 + C00001_comp0/R00004_KM_C00001_comp0) + 1 + C00009_comp0/R00004_KM_C00009_comp0 - 1);  // modifiers: enzyme_R00004
    R00004_KV = 12.787; R00004_kcatf = 4.051078; R00004_kcatb = 40.36144; KM_C00013_comp0 = 0.21652; R00004_KM_C00001_comp0 = 0.21652; R00004_KM_C00009_comp0 = 0.10478;
  R00005: C01010_comp0 + C00001_comp0 -> 2 C00011_comp0 + 2 C00014_comp0; enzyme_R00005*(R00005_kcatf*(C01010_comp0/KM_C01010_comp0)*(C00001_comp0/R00005_KM_C00001_comp0) - C00011_comp0/KM_C00011_comp0*(C00014_comp0/KM_C00014_comp0)*R00005_kcatb)/((1 + C01010_comp0/KM_C01010_comp0)*(1 + C00001_comp0/R00005_KM_C00001_comp0) + (1 + C00011_comp0/KM_C00011_comp0)*(1 + C00014_comp0/KM_C00014_comp0) - 1);  // modifiers: enzyme_R00005
    R00005_KV = 4.953; R00005_kcatf = 5.027722; R00005_kcatb = 4.879389; KM_C01010_comp0 = 0.16999; R00005_KM_C00001_comp0 = 0.16999; KM_C00011_comp0 = 0.16999; KM_C00014_comp0 = 0.16999;
end
