// SBML level 2 version 3

model kegg2sbml()

  // Compartments:
  compartment comp0 = 1;

  // Species:
  species C00890_comp0 in comp0 = 0.1; C00890_comp0 is "Polyphosphate";
  species C00001_comp0 in comp0 = 0.1; C00001_comp0 is "H2O";
  species C02174_comp0 in comp0 = 0.1; C02174_comp0 is "Oligophosphate";
  species C00022_comp0 in comp0 = 0.1; C00022_comp0 is "Pyruvate";
  species C00068_comp0 in comp0 = 0.1; C00068_comp0 is "Thiamin_diphosphate";
  species C05125_comp0 in comp0 = 0.1; C05125_comp0 is "2_(alpha_Hydroxyethyl)thiamine_diphosphate";
  species C00011_comp0 in comp0 = 0.1; C00011_comp0 is "CO2";
  species enzyme_R00001 in comp0 = 0.00016659;
  species enzyme_R00014 in comp0 = 0.00021439;

  // Parameters:
  KG_C00890_comp0 = -150.7;
  KG_C00001_comp0 = -150.7;
  KG_C02174_comp0 = -301.3;
  KG_C00022_comp0 = -227.29;
  KG_C00068_comp0 = -227.29;
  KG_C05125_comp0 = -224.71;
  KG_C00011_comp0 = -224.71;

  // Reactions:
  R00001: C00890_comp0 + C00001_comp0 -> C02174_comp0; enzyme_R00001*(R00001_kcatf*(C00890_comp0/KM_C00890_comp0)*(C00001_comp0/KM_C00001_comp0) - C02174_comp0/KM_C02174_comp0*R00001_kcatb)/((1 + C00890_comp0/KM_C00890_comp0)*(1 + C00001_comp0/KM_C00001_comp0) + 1 + C02174_comp0/KM_C02174_comp0 - 1);  // modifiers: enzyme_R00001
    R00001_KV = 4.953; R00001_kcatf = 4.844606; R00001_kcatb = 5.063819; KM_C00890_comp0 = 0.16999; KM_C00001_comp0 = 0.16999; KM_C02174_comp0 = 0.16999;
  R00014: C00022_comp0 + C00068_comp0 -> C05125_comp0 + C00011_comp0; enzyme_R00014*(R00014_kcatf*(C00022_comp0/KM_C00022_comp0)*(C00068_comp0/KM_C00068_comp0) - C05125_comp0/KM_C05125_comp0*(C00011_comp0/KM_C00011_comp0)*R00014_kcatb)/((1 + C00022_comp0/KM_C00022_comp0)*(1 + C00068_comp0/KM_C00068_comp0) + (1 + C05125_comp0/KM_C05125_comp0)*(1 + C00011_comp0/KM_C00011_comp0) - 1);  // modifiers: enzyme_R00014
    R00014_KV = 2.0884; R00014_kcatf = 0.7397182; R00014_kcatb = 5.896048; KM_C00022_comp0 = 0.21189; KM_C00068_comp0 = 0.21189; KM_C05125_comp0 = 0.13638; KM_C00011_comp0 = 0.13638;
end
