// SBML level 2 version 3

model model()

  // Compartments:
  compartment GO_0005623 = 1;  // GO:0005623

  // Species:
  species $A_GO_0005623 in GO_0005623 = 6;
  species B_GO_0005623 in GO_0005623 = 20;
  species enzyme_reaction_0_GO_0005623 in GO_0005623 = 1; enzyme_reaction_0_GO_0005623 is "enzyme_enzyme_reaction_0";

  // Reactions:
  reaction_0: 2 $A_GO_0005623 -> B_GO_0005623; enzyme_reaction_0_GO_0005623*(k_f_reaction_0*(A_GO_0005623/KM_reaction_0_A_GO_0005623)^2 - k_b_reaction_0*(B_GO_0005623/KM_reaction_0_B_GO_0005623))/((1 + A_GO_0005623/KM_reaction_0_A_GO_0005623)^2*(1 + B_GO_0005623/KM_reaction_0_B_GO_0005623));  // modifiers: enzyme_reaction_0_GO_0005623
    k_f_reaction_0 = 20; k_b_reaction_0 = 20; KM_reaction_0_A_GO_0005623 = 1; KM_reaction_0_B_GO_0005623 = 1;
end
