// SBML level 2 version 3

model model()

  // Compartments:
  compartment GO_0005623 = 1;  // GO:0005623

  // Species:
  species $ex1_GO_0005623 in GO_0005623 = 3;
  species a_GO_0005623 in GO_0005623 = 2.5;
  species enzyme_reaction_0_GO_0005623 in GO_0005623 = 2.4; enzyme_reaction_0_GO_0005623 is "enzyme_enzyme_reaction_0";
  species b_GO_0005623 in GO_0005623 = 2;
  species enzyme_reaction_1_GO_0005623 in GO_0005623 = 2.1; enzyme_reaction_1_GO_0005623 is "enzyme_enzyme_reaction_1";
  species c_GO_0005623 in GO_0005623 = 1.5;
  species enzyme_reaction_2_GO_0005623 in GO_0005623 = 1.82; enzyme_reaction_2_GO_0005623 is "enzyme_enzyme_reaction_2";
  species d_GO_0005623 in GO_0005623 = 1;
  species enzyme_reaction_3_GO_0005623 in GO_0005623 = 1.56; enzyme_reaction_3_GO_0005623 is "enzyme_enzyme_reaction_3";
  species $ex2_GO_0005623 in GO_0005623 = 2;
  species enzyme_reaction_4_GO_0005623 in GO_0005623 = 0.84; enzyme_reaction_4_GO_0005623 is "enzyme_enzyme_reaction_4";
  species $ex3_GO_0005623 in GO_0005623 = 0.5;
  species enzyme_reaction_5_GO_0005623 in GO_0005623 = 2.64; enzyme_reaction_5_GO_0005623 is "enzyme_enzyme_reaction_5";

  // Reactions:
  reaction_0: $ex1_GO_0005623 -> a_GO_0005623; enzyme_reaction_0_GO_0005623*(kf_reaction_0*(ex1_GO_0005623/kM_reaction_0_ex1_GO_0005623) - kb_reaction_0*(a_GO_0005623/kM_reaction_0_a_GO_0005623))/((1 + ex1_GO_0005623/kM_reaction_0_ex1_GO_0005623)*(1 + a_GO_0005623/kM_reaction_0_a_GO_0005623));  // modifiers: enzyme_reaction_0_GO_0005623
    kf_reaction_0 = 1; kb_reaction_0 = 1; kM_reaction_0_ex1_GO_0005623 = 5; kM_reaction_0_a_GO_0005623 = 5;
  reaction_1: a_GO_0005623 -> b_GO_0005623; enzyme_reaction_1_GO_0005623*(kf_reaction_1*(a_GO_0005623/kM_reaction_1_a_GO_0005623) - kb_reaction_1*(b_GO_0005623/kM_reaction_1_b_GO_0005623))/((1 + a_GO_0005623/kM_reaction_1_a_GO_0005623)*(1 + b_GO_0005623/kM_reaction_1_b_GO_0005623));  // modifiers: enzyme_reaction_1_GO_0005623
    kf_reaction_1 = 1; kb_reaction_1 = 1; kM_reaction_1_a_GO_0005623 = 5; kM_reaction_1_b_GO_0005623 = 5;
  reaction_2: b_GO_0005623 -> c_GO_0005623; enzyme_reaction_2_GO_0005623*(kf_reaction_2*(b_GO_0005623/kM_reaction_2_b_GO_0005623) - kb_reaction_2*(c_GO_0005623/kM_reaction_2_c_GO_0005623))/((1 + b_GO_0005623/kM_reaction_2_b_GO_0005623)*(1 + c_GO_0005623/kM_reaction_2_c_GO_0005623));  // modifiers: enzyme_reaction_2_GO_0005623
    kf_reaction_2 = 1; kb_reaction_2 = 1; kM_reaction_2_b_GO_0005623 = 5; kM_reaction_2_c_GO_0005623 = 5;
  reaction_3: c_GO_0005623 -> d_GO_0005623; enzyme_reaction_3_GO_0005623*(kf_reaction_3*(c_GO_0005623/kM_reaction_3_c_GO_0005623) - kb_reaction_3*(d_GO_0005623/kM_reaction_3_d_GO_0005623))/((1 + c_GO_0005623/kM_reaction_3_c_GO_0005623)*(1 + d_GO_0005623/kM_reaction_3_d_GO_0005623));  // modifiers: enzyme_reaction_3_GO_0005623
    kf_reaction_3 = 1; kb_reaction_3 = 1; kM_reaction_3_c_GO_0005623 = 5; kM_reaction_3_d_GO_0005623 = 5;
  reaction_4: $ex2_GO_0005623 -> d_GO_0005623; enzyme_reaction_4_GO_0005623*(kf_reaction_4*(ex2_GO_0005623/kM_reaction_4_ex2_GO_0005623) - kb_reaction_4*(d_GO_0005623/kM_reaction_4_d_GO_0005623))/((1 + ex2_GO_0005623/kM_reaction_4_ex2_GO_0005623)*(1 + d_GO_0005623/kM_reaction_4_d_GO_0005623));  // modifiers: enzyme_reaction_4_GO_0005623
    kf_reaction_4 = 1; kb_reaction_4 = 1; kM_reaction_4_ex2_GO_0005623 = 5; kM_reaction_4_d_GO_0005623 = 5;
  reaction_5: d_GO_0005623 -> $ex3_GO_0005623; enzyme_reaction_5_GO_0005623*(kf_reaction_5*(d_GO_0005623/kM_reaction_5_d_GO_0005623) - kb_reaction_5*(ex3_GO_0005623/kM_reaction_5_ex3_GO_0005623))/((1 + d_GO_0005623/kM_reaction_5_d_GO_0005623)*(1 + ex3_GO_0005623/kM_reaction_5_ex3_GO_0005623));  // modifiers: enzyme_reaction_5_GO_0005623
    kf_reaction_5 = 1; kb_reaction_5 = 1; kM_reaction_5_d_GO_0005623 = 5; kM_reaction_5_ex3_GO_0005623 = 5;
end
