// SBML level 2 version 3

model model()

  // Compartments:
  compartment GO_0005623 = 1;  // GO:0005623

  // Species:
  species $ex1_GO_0005623 in GO_0005623 = 3;
  species a_GO_0005623 in GO_0005623 = 2.5;
  species enzyme_reaction_0_GO_0005623 in GO_0005623 = 1; enzyme_reaction_0_GO_0005623 is "enzyme_enzyme_reaction_0";
  species b_GO_0005623 in GO_0005623 = 2;
  species enzyme_reaction_1_GO_0005623 in GO_0005623 = 1; enzyme_reaction_1_GO_0005623 is "enzyme_enzyme_reaction_1";
  species c_GO_0005623 in GO_0005623 = 1.5;
  species enzyme_reaction_2_GO_0005623 in GO_0005623 = 1; enzyme_reaction_2_GO_0005623 is "enzyme_enzyme_reaction_2";
  species d_GO_0005623 in GO_0005623 = 1;
  species enzyme_reaction_3_GO_0005623 in GO_0005623 = 1; enzyme_reaction_3_GO_0005623 is "enzyme_enzyme_reaction_3";
  species $ex2_GO_0005623 in GO_0005623 = 2;
  species enzyme_reaction_4_GO_0005623 in GO_0005623 = 1; enzyme_reaction_4_GO_0005623 is "enzyme_enzyme_reaction_4";
  species $ex3_GO_0005623 in GO_0005623 = 0.5;
  species enzyme_reaction_5_GO_0005623 in GO_0005623 = 1; enzyme_reaction_5_GO_0005623 is "enzyme_enzyme_reaction_5";

  // Reactions:
  reaction_0: $ex1_GO_0005623 -> a_GO_0005623; enzyme_reaction_0_GO_0005623*(kf_reaction_0*ex1_GO_0005623 - kb_reaction_0*a_GO_0005623);  // modifiers: enzyme_reaction_0_GO_0005623
    kf_reaction_0 = 0.05; kb_reaction_0 = 0.05;
  reaction_1: a_GO_0005623 -> b_GO_0005623; enzyme_reaction_1_GO_0005623*(kf_reaction_1*a_GO_0005623 - kb_reaction_1*b_GO_0005623);  // modifiers: enzyme_reaction_1_GO_0005623
    kf_reaction_1 = 0.05; kb_reaction_1 = 0.05;
  reaction_2: b_GO_0005623 -> c_GO_0005623; enzyme_reaction_2_GO_0005623*(kf_reaction_2*b_GO_0005623 - kb_reaction_2*c_GO_0005623);  // modifiers: enzyme_reaction_2_GO_0005623
    kf_reaction_2 = 0.05; kb_reaction_2 = 0.05;
  reaction_3: c_GO_0005623 -> d_GO_0005623; enzyme_reaction_3_GO_0005623*(kf_reaction_3*c_GO_0005623 - kb_reaction_3*d_GO_0005623);  // modifiers: enzyme_reaction_3_GO_0005623
    kf_reaction_3 = 0.05; kb_reaction_3 = 0.05;
  reaction_4: $ex2_GO_0005623 -> d_GO_0005623; enzyme_reaction_4_GO_0005623*(kf_reaction_4*ex2_GO_0005623 - kb_reaction_4*d_GO_0005623);  // modifiers: enzyme_reaction_4_GO_0005623
    kf_reaction_4 = 0.1; kb_reaction_4 = 0.1;
  reaction_5: d_GO_0005623 -> $ex3_GO_0005623; enzyme_reaction_5_GO_0005623*(kf_reaction_5*d_GO_0005623 - kb_reaction_5*ex3_GO_0005623);  // modifiers: enzyme_reaction_5_GO_0005623
    kf_reaction_5 = 0.1; kb_reaction_5 = 0.1;
end
