// SBML level 2 version 3

model model()

  // Compartments:
  compartment c = 1;
  compartment ext = 1;

  // Species:
  species C00022_c in c = 1; C00022_c is "Pyruvate";  // kegg.compound:C00022
  species $C00068_c in c = 1; C00068_c is "Thiamin diphosphate";  // kegg.compound:C00068
  species C05125_c in c = 1; C05125_c is "2-(alpha-Hydroxyethyl)thiamine diphosphate";  // kegg.compound:C05125
  species $C00011_c in c = 1; C00011_c is "CO2";  // kegg.compound:C00011
  species enzyme_R00014_c in c = 1.142397; enzyme_R00014_c is "enzyme_enzyme_R00014";
  species C00002_c in c = 1; C00002_c is "ATP";  // kegg.compound:C00002
  species C00008_c in c = 1; C00008_c is "ADP";  // kegg.compound:C00008
  species C00074_c in c = 1; C00074_c is "Phosphoenolpyruvate";  // kegg.compound:C00074
  species enzyme_R00200_c in c = 0.2855889; enzyme_R00200_c is "enzyme_enzyme_R00200";
  species C00084_c in c = 1; C00084_c is "Acetaldehyde";  // kegg.compound:C00084
  species enzyme_R00224_c in c = 0.7947317; enzyme_R00224_c is "enzyme_enzyme_R00224";
  species C05379_c in c = 1; C05379_c is "Oxalosuccinate";  // kegg.compound:C05379
  species C00026_c in c = 1; C00026_c is "2-Oxoglutarate";  // kegg.compound:C00026
  species enzyme_R00268_c in c = 1.598505; enzyme_R00268_c is "enzyme_enzyme_R00268";
  species C00036_c in c = 1; C00036_c is "Oxaloacetate";  // kegg.compound:C00036
  species enzyme_R00341_c in c = 1.465738; enzyme_R00341_c is "enzyme_enzyme_R00341";
  species C00149_c in c = 1; C00149_c is "(S)-Malate";  // kegg.compound:C00149
  species C00003_c in c = 1; C00003_c is "NAD+";  // kegg.compound:C00003
  species C00004_c in c = 1; C00004_c is "NADH";  // kegg.compound:C00004
  species $C00080_c in c = 1; C00080_c is "H+";  // kegg.compound:C00080
  species enzyme_R00342_c in c = 2.908452; enzyme_R00342_c is "enzyme_enzyme_R00342";
  species $C00288_c in c = 1; C00288_c is "HCO3-";  // kegg.compound:C00288
  species $C00009_c in c = 1; C00009_c is "Orthophosphate";  // kegg.compound:C00009
  species enzyme_R00344_c in c = 4.264255; enzyme_R00344_c is "enzyme_enzyme_R00344";
  species C00158_c in c = 1; C00158_c is "Citrate";  // kegg.compound:C00158
  species $C00010_c in c = 1; C00010_c is "CoA";  // kegg.compound:C00010
  species C00024_c in c = 1; C00024_c is "Acetyl-CoA";  // kegg.compound:C00024
  species $C00001_c in c = 1; C00001_c is "H2O";  // kegg.compound:C00001
  species enzyme_R00351_c in c = 0.7270419; enzyme_R00351_c is "enzyme_enzyme_R00351";
  species C00044_c in c = 1; C00044_c is "GTP";  // kegg.compound:C00044
  species C00042_c in c = 1; C00042_c is "Succinate";  // kegg.compound:C00042
  species C00035_c in c = 1; C00035_c is "GDP";  // kegg.compound:C00035
  species C00091_c in c = 1; C00091_c is "Succinyl-CoA";  // kegg.compound:C00091
  species enzyme_R00432_c in c = 4.267051; enzyme_R00432_c is "enzyme_enzyme_R00432";
  species C00048_c in c = 1; C00048_c is "Glyoxylate";  // kegg.compound:C00048
  species enzyme_R00472_c in c = 0.7273758; enzyme_R00472_c is "enzyme_enzyme_R00472";
  species C00311_c in c = 1; C00311_c is "Isocitrate";  // kegg.compound:C00311
  species enzyme_R00479_c in c = 1.600687; enzyme_R00479_c is "enzyme_enzyme_R00479";
  species C05381_c in c = 1; C05381_c is "3-Carboxy-1-hydroxypropyl-ThPP";  // kegg.compound:C05381
  species enzyme_R00621_c in c = 0.2856789; enzyme_R00621_c is "enzyme_enzyme_R00621";
  species C00631_c in c = 1; C00631_c is "2-Phospho-D-glycerate";  // kegg.compound:C00631
  species enzyme_R00658_c in c = 1.600271; enzyme_R00658_c is "enzyme_enzyme_R00658";
  species enzyme_R00709_c in c = 3.371646; enzyme_R00709_c is "enzyme_enzyme_R00709";
  species C00469_c in c = 1; C00469_c is "Ethanol";  // kegg.compound:C00469
  species enzyme_R00754_c in c = 2.917228; enzyme_R00754_c is "enzyme_enzyme_R00754";
  species C00184_c in c = 1; C00184_c is "Glycerone";  // kegg.compound:C00184
  species C00111_c in c = 1; C00111_c is "Glycerone phosphate";  // kegg.compound:C00111
  species enzyme_R01011_c in c = 0.5292233; enzyme_R01011_c is "enzyme_enzyme_R01011";
  species C00118_c in c = 1; C00118_c is "D-Glyceraldehyde 3-phosphate";  // kegg.compound:C00118
  species enzyme_R01015_c in c = 0.6664382; enzyme_R01015_c is "enzyme_enzyme_R01015";
  species C00116_c in c = 1; C00116_c is "Glycerol";  // kegg.compound:C00116
  species enzyme_R01034_c in c = 2.689975; enzyme_R01034_c is "enzyme_enzyme_R01034";
  species C00117_c in c = 1; C00117_c is "D-Ribose 5-phosphate";  // kegg.compound:C00117
  species C00199_c in c = 1; C00199_c is "D-Ribulose 5-phosphate";  // kegg.compound:C00199
  species enzyme_R01056_c in c = 1.337597; enzyme_R01056_c is "enzyme_enzyme_R01056";
  species C00236_c in c = 1; C00236_c is "3-Phospho-D-glyceroyl phosphate";  // kegg.compound:C00236
  species enzyme_R01061_c in c = 4.26739; enzyme_R01061_c is "enzyme_enzyme_R01061";
  species C00085_c in c = 1; C00085_c is "D-Fructose 6-phosphate";  // kegg.compound:C00085
  species C00279_c in c = 1; C00279_c is "D-Erythrose 4-phosphate";  // kegg.compound:C00279
  species C00231_c in c = 1; C00231_c is "D-Xylulose 5-phosphate";  // kegg.compound:C00231
  species enzyme_R01067_c in c = 0; enzyme_R01067_c is "enzyme_enzyme_R01067";
  species C05378_c in c = 1; C05378_c is "beta-D-Fructose 1,6-bisphosphate";  // kegg.compound:C05378
  species enzyme_R01070_c in c = 1.598388; enzyme_R01070_c is "enzyme_enzyme_R01070";
  species C00122_c in c = 1; C00122_c is "Fumarate";  // kegg.compound:C00122
  species enzyme_R01082_c in c = 0.7998717; enzyme_R01082_c is "enzyme_enzyme_R01082";
  species C00417_c in c = 1; C00417_c is "cis-Aconitate";  // kegg.compound:C00417
  species enzyme_R01325_c in c = 1.599643; enzyme_R01325_c is "enzyme_enzyme_R01325";
  species C00197_c in c = 1; C00197_c is "3-Phospho-D-glycerate";  // kegg.compound:C00197
  species enzyme_R01512_c in c = 2.286024; enzyme_R01512_c is "enzyme_enzyme_R01512";
  species enzyme_R01518_c in c = 1.33348; enzyme_R01518_c is "enzyme_enzyme_R01518";
  species C00345_c in c = 1; C00345_c is "6-Phospho-D-gluconate";  // kegg.compound:C00345
  species C00006_c in c = 1; C00006_c is "NADP+";  // kegg.compound:C00006
  species C00005_c in c = 1; C00005_c is "NADPH";  // kegg.compound:C00005
  species enzyme_R01528_c in c = 3.368529; enzyme_R01528_c is "enzyme_enzyme_R01528";
  species enzyme_R01529_c in c = 1.331253; enzyme_R01529_c is "enzyme_enzyme_R01529";
  species C00221_c in c = 1; C00221_c is "beta-D-Glucose";  // kegg.compound:C00221
  species C01172_c in c = 1; C01172_c is "beta-D-Glucose 6-phosphate";  // kegg.compound:C01172
  species enzyme_R01600_c in c = 2.286312; enzyme_R01600_c is "enzyme_enzyme_R01600";
  species C05382_c in c = 1; C05382_c is "D-Sedoheptulose 7-phosphate";  // kegg.compound:C05382
  species enzyme_R01641_c in c = 1.142714; enzyme_R01641_c is "enzyme_enzyme_R01641";
  species $C00579_c in c = 1; C00579_c is "Dihydrolipoamide";  // kegg.compound:C00579
  species $C00248_c in c = 1; C00248_c is "Lipoamide";  // kegg.compound:C00248
  species enzyme_R01698_c in c = 2.907743; enzyme_R01698_c is "enzyme_enzyme_R01698";
  species enzyme_R01827_c in c = 2.286081; enzyme_R01827_c is "enzyme_enzyme_R01827";
  species enzyme_R01830_c in c = 1.140042; enzyme_R01830_c is "enzyme_enzyme_R01830";
  species enzyme_R01899_c in c = 1.453177; enzyme_R01899_c is "enzyme_enzyme_R01899";
  species enzyme_R01900_c in c = 1.599576; enzyme_R01900_c is "enzyme_enzyme_R01900";
  species C01236_c in c = 1; C01236_c is "D-Glucono-1,5-lactone 6-phosphate";  // kegg.compound:C01236
  species enzyme_R02035_c in c = 1.599841; enzyme_R02035_c is "enzyme_enzyme_R02035";
  species C00028_c in c = 1; C00028_c is "Acceptor";  // kegg.compound:C00028
  species C00030_c in c = 1; C00030_c is "Reduced acceptor";  // kegg.compound:C00030
  species enzyme_R00412_c in c = 2.251886; enzyme_R00412_c is "enzyme_enzyme_R00412";
  species $C15973_c in c = 1; C15973_c is "Enzyme N6-(dihydrolipoyl)lysine";  // kegg.compound:C15973
  species C16255_c in c = 1; C16255_c is "[Dihydrolipoyllysine-residue acetyltransferase] S-acetyldihydrolipoyllysine";  // kegg.compound:C16255
  species enzyme_R02569_c in c = 2.285024; enzyme_R02569_c is "enzyme_enzyme_R02569";
  species C16254_c in c = 1; C16254_c is "[Dihydrolipoyllysine-residue succinyltransferase] S-succinyldihydrolipoyllysine";  // kegg.compound:C16254
  species enzyme_R02570_c in c = 2.28589; enzyme_R02570_c is "enzyme_enzyme_R02570";
  species enzyme_R02736_c in c = 1.454596; enzyme_R02736_c is "enzyme_enzyme_R02736";
  species $C15972_c in c = 1; C15972_c is "Enzyme N6-(lipoyl)lysine";  // kegg.compound:C15972
  species enzyme_R03270_c in c = 2.284887; enzyme_R03270_c is "enzyme_enzyme_R03270";
  species enzyme_R03316_c in c = 2.285389; enzyme_R03316_c is "enzyme_enzyme_R03316";
  species enzyme_R03321_c in c = 1.334324; enzyme_R03321_c is "enzyme_enzyme_R03321";
  species enzyme_R04779_c in c = 0.07134091; enzyme_R04779_c is "enzyme_enzyme_R04779";
  species enzyme_R04780_c in c = 2.284838; enzyme_R04780_c is "enzyme_enzyme_R04780";
  species C00033_c in c = 1; C00033_c is "Acetate";  // kegg.compound:C00033
  species enzyme_R00710_c in c = 2.136177; enzyme_R00710_c is "enzyme_enzyme_R00710";
  species enzyme_R00711_c in c = 4.227981; enzyme_R00711_c is "enzyme_enzyme_R00711";
  species $C00025_c in c = 1; C00025_c is "L-Glutamate";  // kegg.compound:C00025
  species $C00014_c in c = 1; C00014_c is "NH3";  // kegg.compound:C00014
  species enzyme_R00243_c in c = 5.581132; enzyme_R00243_c is "enzyme_enzyme_R00243";
  species $Glycerolext_ext in ext = 1; Glycerolext_ext is "Glycerol[ext]";  // kegg:C00116 cas:56-81-5 3dmet:B00032 pubchem:3416
  species enzyme_reaction_0_c in c = 1.242055; enzyme_reaction_0_c is "enzyme_enzyme_reaction_0";
  species $Ethanolext_ext in ext = 1; Ethanolext_ext is "Ethanol[ext]";  // kegg:C00469 cas:64-17-5 3dmet:B01253 pubchem:3752
  species enzyme_reaction_1_c in c = 1.337597; enzyme_reaction_1_c is "enzyme_enzyme_reaction_1";
  species $beta_D_Glucoseext_ext in ext = 1; beta_D_Glucoseext_ext is "beta-D-Glucose[ext]";  // kegg:C00221 cas:492-61-5 3dmet:B01193 pubchem:3521
  species enzyme_reaction_2_c in c = 1.32727; enzyme_reaction_2_c is "enzyme_enzyme_reaction_2";
  species $Acetateext_ext in ext = 1; Acetateext_ext is "Acetate[ext]";  // kegg:C00033 cas:64-19-7 3dmet:B00009 pubchem:3335
  species enzyme_reaction_3_c in c = 1.349733; enzyme_reaction_3_c is "enzyme_enzyme_reaction_3";
  species enzyme_reaction_4_c in c = 2.286011; enzyme_reaction_4_c is "enzyme_enzyme_reaction_4";
  species $O2_c in c = 1;  // kegg:C00007 cas:7782-44-7 3dmet:B00001 pubchem:3309
  species enzyme_reaction_5_c in c = 3.575; enzyme_reaction_5_c is "enzyme_enzyme_reaction_5";
  species enzyme_reaction_6_c in c = 3.576942; enzyme_reaction_6_c is "enzyme_enzyme_reaction_6";
  species enzyme_reaction_7_c in c = 1.332723; enzyme_reaction_7_c is "enzyme_enzyme_reaction_7";
  species $Biomass_c in c = 1;
  species enzyme_reaction_8_c in c = 78882.06; enzyme_reaction_8_c is "enzyme_enzyme_reaction_8";

  // Reactions:
  R00014: C00022_c + $C00068_c -> C05125_c + $C00011_c; enzyme_R00014_c*(kf_R00014*(C00022_c/kM_R00014_C00022_c)*(C00068_c/kM_R00014_C00068_c) - kb_R00014*(C05125_c/kM_R00014_C05125_c)*(C00011_c/kM_R00014_C00011_c))/((1 + C00022_c/kM_R00014_C00022_c)*(1 + C00068_c/kM_R00014_C00068_c)*(1 + C05125_c/kM_R00014_C05125_c)*(1 + C00011_c/kM_R00014_C00011_c));  // modifiers: enzyme_R00014_c; kegg.reaction:R00014
    kf_R00014 = 2.859815; kb_R00014 = 2.124519; kM_R00014_C00022_c = 1; kM_R00014_C00068_c = 1; kM_R00014_C05125_c = 1; kM_R00014_C00011_c = 1;
  R00200: C00002_c + C00022_c -> C00008_c + C00074_c; enzyme_R00200_c*(kf_R00200*(C00002_c/kM_R00200_C00002_c)*(C00022_c/kM_R00200_C00022_c) - kb_R00200*(C00008_c/kM_R00200_C00008_c)*(C00074_c/kM_R00200_C00074_c))/((1 + C00002_c/kM_R00200_C00002_c)*(1 + C00022_c/kM_R00200_C00022_c)*(1 + C00008_c/kM_R00200_C00008_c)*(1 + C00074_c/kM_R00200_C00074_c));  // modifiers: enzyme_R00200_c; kegg.reaction:R00200
    kf_R00200 = 15.73523; kb_R00200 = 21.18082; kM_R00200_C00002_c = 1; kM_R00200_C00022_c = 1; kM_R00200_C00008_c = 1; kM_R00200_C00074_c = 1;
  R00224: C00022_c -> C00084_c + $C00011_c; enzyme_R00224_c*(kf_R00224*(C00022_c/kM_R00224_C00022_c) - kb_R00224*(C00084_c/kM_R00224_C00084_c)*(C00011_c/kM_R00224_C00011_c))/((1 + C00022_c/kM_R00224_C00022_c)*(1 + C00084_c/kM_R00224_C00084_c)*(1 + C00011_c/kM_R00224_C00011_c));  // modifiers: enzyme_R00224_c; kegg.reaction:R00224
    kf_R00224 = 0.3143101; kb_R00224 = 0.2418328; kM_R00224_C00022_c = 1; kM_R00224_C00084_c = 1; kM_R00224_C00011_c = 1;
  R00268: C05379_c -> C00026_c + $C00011_c; enzyme_R00268_c*(kf_R00268*(C05379_c/kM_R00268_C05379_c) - kb_R00268*(C00026_c/kM_R00268_C00026_c)*(C00011_c/kM_R00268_C00011_c))/((1 + C05379_c/kM_R00268_C05379_c)*(1 + C00026_c/kM_R00268_C00026_c)*(1 + C00011_c/kM_R00268_C00011_c));  // modifiers: enzyme_R00268_c; kegg.reaction:R00268
    kf_R00268 = 2.958587; kb_R00268 = 2.691337; kM_R00268_C05379_c = 1; kM_R00268_C00026_c = 1; kM_R00268_C00011_c = 1;
  R00341: C00002_c + C00036_c -> C00008_c + C00074_c + $C00011_c; enzyme_R00341_c*(kf_R00341*(C00002_c/kM_R00341_C00002_c)*(C00036_c/kM_R00341_C00036_c) - kb_R00341*(C00008_c/kM_R00341_C00008_c)*(C00074_c/kM_R00341_C00074_c)*(C00011_c/kM_R00341_C00011_c))/((1 + C00002_c/kM_R00341_C00002_c)*(1 + C00036_c/kM_R00341_C00036_c)*(1 + C00008_c/kM_R00341_C00008_c)*(1 + C00074_c/kM_R00341_C00074_c)*(1 + C00011_c/kM_R00341_C00011_c));  // modifiers: enzyme_R00341_c; kegg.reaction:R00341
    kf_R00341 = 0.5009811; kb_R00341 = 0.3721722; kM_R00341_C00002_c = 1; kM_R00341_C00036_c = 1; kM_R00341_C00008_c = 1; kM_R00341_C00074_c = 1; kM_R00341_C00011_c = 1;
  R00342: C00149_c + C00003_c -> C00036_c + C00004_c + $C00080_c; enzyme_R00342_c*(kf_R00342*(C00149_c/kM_R00342_C00149_c)*(C00003_c/kM_R00342_C00003_c) - kb_R00342*(C00036_c/kM_R00342_C00036_c)*(C00004_c/kM_R00342_C00004_c)*(C00080_c/kM_R00342_C00080_c))/((1 + C00149_c/kM_R00342_C00149_c)*(1 + C00003_c/kM_R00342_C00003_c)*(1 + C00036_c/kM_R00342_C00036_c)*(1 + C00004_c/kM_R00342_C00004_c)*(1 + C00080_c/kM_R00342_C00080_c));  // modifiers: enzyme_R00342_c; kegg.reaction:R00342
    kf_R00342 = 1.352231; kb_R00342 = 1.004555; kM_R00342_C00149_c = 1; kM_R00342_C00003_c = 1; kM_R00342_C00036_c = 1; kM_R00342_C00004_c = 1; kM_R00342_C00080_c = 1;
  R00344: C00002_c + C00022_c + $C00288_c -> C00008_c + $C00009_c + C00036_c; enzyme_R00344_c*(kf_R00344*(C00002_c/kM_R00344_C00002_c)*(C00022_c/kM_R00344_C00022_c)*(C00288_c/kM_R00344_C00288_c) - kb_R00344*(C00008_c/kM_R00344_C00008_c)*(C00009_c/kM_R00344_C00009_c)*(C00036_c/kM_R00344_C00036_c))/((1 + C00002_c/kM_R00344_C00002_c)*(1 + C00022_c/kM_R00344_C00022_c)*(1 + C00288_c/kM_R00344_C00288_c)*(1 + C00008_c/kM_R00344_C00008_c)*(1 + C00009_c/kM_R00344_C00009_c)*(1 + C00036_c/kM_R00344_C00036_c));  // modifiers: enzyme_R00344_c; kegg.reaction:R00344
    kf_R00344 = 1.920062; kb_R00344 = 1.477312; kM_R00344_C00002_c = 1; kM_R00344_C00022_c = 1; kM_R00344_C00288_c = 1; kM_R00344_C00008_c = 1; kM_R00344_C00009_c = 1; kM_R00344_C00036_c = 1;
  R00351: C00158_c + $C00010_c -> C00024_c + $C00001_c + C00036_c; enzyme_R00351_c*(kf_R00351*(C00158_c/kM_R00351_C00158_c)*(C00010_c/kM_R00351_C00010_c) - kb_R00351*(C00024_c/kM_R00351_C00024_c)*(C00001_c/kM_R00351_C00001_c)*(C00036_c/kM_R00351_C00036_c))/((1 + C00158_c/kM_R00351_C00158_c)*(1 + C00010_c/kM_R00351_C00010_c)*(1 + C00024_c/kM_R00351_C00024_c)*(1 + C00001_c/kM_R00351_C00001_c)*(1 + C00036_c/kM_R00351_C00036_c));  // modifiers: enzyme_R00351_c; kegg.reaction:R00351
    kf_R00351 = 7.34266; kb_R00351 = 9.543359; kM_R00351_C00158_c = 1; kM_R00351_C00010_c = 1; kM_R00351_C00024_c = 1; kM_R00351_C00001_c = 1; kM_R00351_C00036_c = 1;
  R00432: C00044_c + C00042_c + $C00010_c -> C00035_c + $C00009_c + C00091_c; enzyme_R00432_c*(kf_R00432*(C00044_c/kM_R00432_C00044_c)*(C00042_c/kM_R00432_C00042_c)*(C00010_c/kM_R00432_C00010_c) - kb_R00432*(C00035_c/kM_R00432_C00035_c)*(C00009_c/kM_R00432_C00009_c)*(C00091_c/kM_R00432_C00091_c))/((1 + C00044_c/kM_R00432_C00044_c)*(1 + C00042_c/kM_R00432_C00042_c)*(1 + C00010_c/kM_R00432_C00010_c)*(1 + C00035_c/kM_R00432_C00035_c)*(1 + C00009_c/kM_R00432_C00009_c)*(1 + C00091_c/kM_R00432_C00091_c));  // modifiers: enzyme_R00432_c; kegg.reaction:R00432
    kf_R00432 = 3.89559; kb_R00432 = 4.852504; kM_R00432_C00044_c = 1; kM_R00432_C00042_c = 1; kM_R00432_C00010_c = 1; kM_R00432_C00035_c = 1; kM_R00432_C00009_c = 1; kM_R00432_C00091_c = 1;
  R00472: C00149_c + $C00010_c -> C00024_c + $C00001_c + C00048_c; enzyme_R00472_c*(kf_R00472*(C00149_c/kM_R00472_C00149_c)*(C00010_c/kM_R00472_C00010_c) - kb_R00472*(C00024_c/kM_R00472_C00024_c)*(C00001_c/kM_R00472_C00001_c)*(C00048_c/kM_R00472_C00048_c))/((1 + C00149_c/kM_R00472_C00149_c)*(1 + C00010_c/kM_R00472_C00010_c)*(1 + C00024_c/kM_R00472_C00024_c)*(1 + C00001_c/kM_R00472_C00001_c)*(1 + C00048_c/kM_R00472_C00048_c));  // modifiers: enzyme_R00472_c; kegg.reaction:R00472
    kf_R00472 = 3.591082; kb_R00472 = 2.882782; kM_R00472_C00149_c = 1; kM_R00472_C00010_c = 1; kM_R00472_C00024_c = 1; kM_R00472_C00001_c = 1; kM_R00472_C00048_c = 1;
  R00479: C00311_c -> C00042_c + C00048_c; enzyme_R00479_c*(kf_R00479*(C00311_c/kM_R00479_C00311_c) - kb_R00479*(C00042_c/kM_R00479_C00042_c)*(C00048_c/kM_R00479_C00048_c))/((1 + C00311_c/kM_R00479_C00311_c)*(1 + C00042_c/kM_R00479_C00042_c)*(1 + C00048_c/kM_R00479_C00048_c));  // modifiers: enzyme_R00479_c; kegg.reaction:R00479
    kf_R00479 = 0.3275743; kb_R00479 = 0.4080398; kM_R00479_C00311_c = 1; kM_R00479_C00042_c = 1; kM_R00479_C00048_c = 1;
  R00621: C00026_c + $C00068_c -> C05381_c + $C00011_c; enzyme_R00621_c*(kf_R00621*(C00026_c/kM_R00621_C00026_c)*(C00068_c/kM_R00621_C00068_c) - kb_R00621*(C05381_c/kM_R00621_C05381_c)*(C00011_c/kM_R00621_C00011_c))/((1 + C00026_c/kM_R00621_C00026_c)*(1 + C00068_c/kM_R00621_C00068_c)*(1 + C05381_c/kM_R00621_C05381_c)*(1 + C00011_c/kM_R00621_C00011_c));  // modifiers: enzyme_R00621_c; kegg.reaction:R00621
    kf_R00621 = 18.11635; kb_R00621 = 14.54311; kM_R00621_C00026_c = 1; kM_R00621_C00068_c = 1; kM_R00621_C05381_c = 1; kM_R00621_C00011_c = 1;
  R00658: C00631_c -> C00074_c + $C00001_c; enzyme_R00658_c*(kf_R00658*(C00631_c/kM_R00658_C00631_c) - kb_R00658*(C00074_c/kM_R00658_C00074_c)*(C00001_c/kM_R00658_C00001_c))/((1 + C00631_c/kM_R00658_C00631_c)*(1 + C00074_c/kM_R00658_C00074_c)*(1 + C00001_c/kM_R00658_C00001_c));  // modifiers: enzyme_R00658_c; kegg.reaction:R00658
    kf_R00658 = 2.098593; kb_R00658 = 1.614675; kM_R00658_C00631_c = 1; kM_R00658_C00074_c = 1; kM_R00658_C00001_c = 1;
  R00709: C00311_c + C00003_c -> C00026_c + $C00011_c + C00004_c + $C00080_c; enzyme_R00709_c*(kf_R00709*(C00311_c/kM_R00709_C00311_c)*(C00003_c/kM_R00709_C00003_c) - kb_R00709*(C00026_c/kM_R00709_C00026_c)*(C00011_c/kM_R00709_C00011_c)*(C00004_c/kM_R00709_C00004_c)*(C00080_c/kM_R00709_C00080_c))/((1 + C00311_c/kM_R00709_C00311_c)*(1 + C00003_c/kM_R00709_C00003_c)*(1 + C00026_c/kM_R00709_C00026_c)*(1 + C00011_c/kM_R00709_C00011_c)*(1 + C00004_c/kM_R00709_C00004_c)*(1 + C00080_c/kM_R00709_C00080_c));  // modifiers: enzyme_R00709_c; kegg.reaction:R00709
    kf_R00709 = 0.7706621; kb_R00709 = 0.5314911; kM_R00709_C00311_c = 1; kM_R00709_C00003_c = 1; kM_R00709_C00026_c = 1; kM_R00709_C00011_c = 1; kM_R00709_C00004_c = 1; kM_R00709_C00080_c = 1;
  R00754: C00469_c + C00003_c -> C00084_c + C00004_c + $C00080_c; enzyme_R00754_c*(kf_R00754*(C00469_c/kM_R00754_C00469_c)*(C00003_c/kM_R00754_C00003_c) - kb_R00754*(C00084_c/kM_R00754_C00084_c)*(C00004_c/kM_R00754_C00004_c)*(C00080_c/kM_R00754_C00080_c))/((1 + C00469_c/kM_R00754_C00469_c)*(1 + C00003_c/kM_R00754_C00003_c)*(1 + C00084_c/kM_R00754_C00084_c)*(1 + C00004_c/kM_R00754_C00004_c)*(1 + C00080_c/kM_R00754_C00080_c));  // modifiers: enzyme_R00754_c; kegg.reaction:R00754
    kf_R00754 = 0.1463971; kb_R00754 = 0.1902743; kM_R00754_C00469_c = 1; kM_R00754_C00003_c = 1; kM_R00754_C00084_c = 1; kM_R00754_C00004_c = 1; kM_R00754_C00080_c = 1;
  R01011: C00002_c + C00184_c -> C00008_c + C00111_c; enzyme_R01011_c*(kf_R01011*(C00002_c/kM_R01011_C00002_c)*(C00184_c/kM_R01011_C00184_c) - kb_R01011*(C00008_c/kM_R01011_C00008_c)*(C00111_c/kM_R01011_C00111_c))/((1 + C00002_c/kM_R01011_C00002_c)*(1 + C00184_c/kM_R01011_C00184_c)*(1 + C00008_c/kM_R01011_C00008_c)*(1 + C00111_c/kM_R01011_C00111_c));  // modifiers: enzyme_R01011_c; kegg.reaction:R01011
    kf_R01011 = 0.04034911; kb_R01011 = 0.0524423; kM_R01011_C00002_c = 1; kM_R01011_C00184_c = 1; kM_R01011_C00008_c = 1; kM_R01011_C00111_c = 1;
  R01015: C00118_c -> C00111_c; enzyme_R01015_c*(kf_R01015*(C00118_c/kM_R01015_C00118_c) - kb_R01015*(C00111_c/kM_R01015_C00111_c))/((1 + C00118_c/kM_R01015_C00118_c)*(1 + C00111_c/kM_R01015_C00111_c));  // modifiers: enzyme_R01015_c; kegg.reaction:R01015
    kf_R01015 = 0.9692557; kb_R01015 = 1.259755; kM_R01015_C00118_c = 1; kM_R01015_C00111_c = 1;
  R01034: C00116_c + C00003_c -> C00184_c + C00004_c + $C00080_c; enzyme_R01034_c*(kf_R01034*(C00116_c/kM_R01034_C00116_c)*(C00003_c/kM_R01034_C00003_c) - kb_R01034*(C00184_c/kM_R01034_C00184_c)*(C00004_c/kM_R01034_C00004_c)*(C00080_c/kM_R01034_C00080_c))/((1 + C00116_c/kM_R01034_C00116_c)*(1 + C00003_c/kM_R01034_C00003_c)*(1 + C00184_c/kM_R01034_C00184_c)*(1 + C00004_c/kM_R01034_C00004_c)*(1 + C00080_c/kM_R01034_C00080_c));  // modifiers: enzyme_R01034_c; kegg.reaction:R01034
    kf_R01034 = 0.0158765; kb_R01034 = 0.02063491; kM_R01034_C00116_c = 1; kM_R01034_C00003_c = 1; kM_R01034_C00184_c = 1; kM_R01034_C00004_c = 1; kM_R01034_C00080_c = 1;
  R01056: C00117_c -> C00199_c; enzyme_R01056_c*(kf_R01056*(C00117_c/kM_R01056_C00117_c) - kb_R01056*(C00199_c/kM_R01056_C00199_c))/((1 + C00117_c/kM_R01056_C00117_c)*(1 + C00199_c/kM_R01056_C00199_c));  // modifiers: enzyme_R01056_c; kegg.reaction:R01056
    kf_R01056 = 0.1037674; kb_R01056 = 0.1348679; kM_R01056_C00117_c = 1; kM_R01056_C00199_c = 1;
  R01061: C00118_c + $C00009_c + C00003_c -> C00236_c + C00004_c + $C00080_c; enzyme_R01061_c*(kf_R01061*(C00118_c/kM_R01061_C00118_c)*(C00009_c/kM_R01061_C00009_c)*(C00003_c/kM_R01061_C00003_c) - kb_R01061*(C00236_c/kM_R01061_C00236_c)*(C00004_c/kM_R01061_C00004_c)*(C00080_c/kM_R01061_C00080_c))/((1 + C00118_c/kM_R01061_C00118_c)*(1 + C00009_c/kM_R01061_C00009_c)*(1 + C00003_c/kM_R01061_C00003_c)*(1 + C00236_c/kM_R01061_C00236_c)*(1 + C00004_c/kM_R01061_C00004_c)*(1 + C00080_c/kM_R01061_C00080_c));  // modifiers: enzyme_R01061_c; kegg.reaction:R01061
    kf_R01061 = 6.295778; kb_R01061 = 4.844024; kM_R01061_C00118_c = 1; kM_R01061_C00009_c = 1; kM_R01061_C00003_c = 1; kM_R01061_C00236_c = 1; kM_R01061_C00004_c = 1; kM_R01061_C00080_c = 1;
  R01067: C00085_c + C00118_c -> C00279_c + C00231_c; enzyme_R01067_c*(kf_R01067*(C00085_c/kM_R01067_C00085_c)*(C00118_c/kM_R01067_C00118_c) - kb_R01067*(C00279_c/kM_R01067_C00279_c)*(C00231_c/kM_R01067_C00231_c))/((1 + C00085_c/kM_R01067_C00085_c)*(1 + C00118_c/kM_R01067_C00118_c)*(1 + C00279_c/kM_R01067_C00279_c)*(1 + C00231_c/kM_R01067_C00231_c));  // modifiers: enzyme_R01067_c; kegg.reaction:R01067
    kf_R01067 = 0.0004401988; kb_R01067 = 0.0005679252; kM_R01067_C00085_c = 1; kM_R01067_C00118_c = 1; kM_R01067_C00279_c = 1; kM_R01067_C00231_c = 1;
  R01070: C05378_c -> C00111_c + C00118_c; enzyme_R01070_c*(kf_R01070*(C05378_c/kM_R01070_C05378_c) - kb_R01070*(C00111_c/kM_R01070_C00111_c)*(C00118_c/kM_R01070_C00118_c))/((1 + C05378_c/kM_R01070_C05378_c)*(1 + C00111_c/kM_R01070_C00111_c)*(1 + C00118_c/kM_R01070_C00118_c));  // modifiers: enzyme_R01070_c; kegg.reaction:R01070
    kf_R01070 = 1.059215; kb_R01070 = 0.8149686; kM_R01070_C05378_c = 1; kM_R01070_C00111_c = 1; kM_R01070_C00118_c = 1;
  R01082: C00149_c -> C00122_c + $C00001_c; enzyme_R01082_c*(kf_R01082*(C00149_c/kM_R01082_C00149_c) - kb_R01082*(C00122_c/kM_R01082_C00122_c)*(C00001_c/kM_R01082_C00001_c))/((1 + C00149_c/kM_R01082_C00149_c)*(1 + C00122_c/kM_R01082_C00122_c)*(1 + C00001_c/kM_R01082_C00001_c));  // modifiers: enzyme_R01082_c; kegg.reaction:R01082
    kf_R01082 = 1.591772; kb_R01082 = 2.068849; kM_R01082_C00149_c = 1; kM_R01082_C00122_c = 1; kM_R01082_C00001_c = 1;
  R01325: C00158_c -> C00417_c + $C00001_c; enzyme_R01325_c*(kf_R01325*(C00158_c/kM_R01325_C00158_c) - kb_R01325*(C00417_c/kM_R01325_C00417_c)*(C00001_c/kM_R01325_C00001_c))/((1 + C00158_c/kM_R01325_C00158_c)*(1 + C00417_c/kM_R01325_C00417_c)*(1 + C00001_c/kM_R01325_C00001_c));  // modifiers: enzyme_R01325_c; kegg.reaction:R01325
    kf_R01325 = 1.08441; kb_R01325 = 0.8343539; kM_R01325_C00158_c = 1; kM_R01325_C00417_c = 1; kM_R01325_C00001_c = 1;
  R01512: C00002_c + C00197_c -> C00008_c + C00236_c; enzyme_R01512_c*(kf_R01512*(C00002_c/kM_R01512_C00002_c)*(C00197_c/kM_R01512_C00197_c) - kb_R01512*(C00008_c/kM_R01512_C00008_c)*(C00236_c/kM_R01512_C00236_c))/((1 + C00002_c/kM_R01512_C00002_c)*(1 + C00197_c/kM_R01512_C00197_c)*(1 + C00008_c/kM_R01512_C00008_c)*(1 + C00236_c/kM_R01512_C00236_c));  // modifiers: enzyme_R01512_c; kegg.reaction:R01512
    kf_R01512 = 2.260515; kb_R01512 = 2.938023; kM_R01512_C00002_c = 1; kM_R01512_C00197_c = 1; kM_R01512_C00008_c = 1; kM_R01512_C00236_c = 1;
  R01518: C00631_c -> C00197_c; enzyme_R01518_c*(kf_R01518*(C00631_c/kM_R01518_C00631_c) - kb_R01518*(C00197_c/kM_R01518_C00197_c))/((1 + C00631_c/kM_R01518_C00631_c)*(1 + C00197_c/kM_R01518_C00197_c));  // modifiers: enzyme_R01518_c; kegg.reaction:R01518
    kf_R01518 = 0.9688171; kb_R01518 = 1.259185; kM_R01518_C00631_c = 1; kM_R01518_C00197_c = 1;
  R01528: C00345_c + C00006_c -> C00199_c + $C00011_c + C00005_c + $C00080_c; enzyme_R01528_c*(kf_R01528*(C00345_c/kM_R01528_C00345_c)*(C00006_c/kM_R01528_C00006_c) - kb_R01528*(C00199_c/kM_R01528_C00199_c)*(C00011_c/kM_R01528_C00011_c)*(C00005_c/kM_R01528_C00005_c)*(C00080_c/kM_R01528_C00080_c))/((1 + C00345_c/kM_R01528_C00345_c)*(1 + C00006_c/kM_R01528_C00006_c)*(1 + C00199_c/kM_R01528_C00199_c)*(1 + C00011_c/kM_R01528_C00011_c)*(1 + C00005_c/kM_R01528_C00005_c)*(1 + C00080_c/kM_R01528_C00080_c));  // modifiers: enzyme_R01528_c; kegg.reaction:R01528
    kf_R01528 = 1.903303; kb_R01528 = 1.464417; kM_R01528_C00345_c = 1; kM_R01528_C00006_c = 1; kM_R01528_C00199_c = 1; kM_R01528_C00011_c = 1; kM_R01528_C00005_c = 1; kM_R01528_C00080_c = 1;
  R01529: C00199_c -> C00231_c; enzyme_R01529_c*(kf_R01529*(C00199_c/kM_R01529_C00199_c) - kb_R01529*(C00231_c/kM_R01529_C00231_c))/((1 + C00199_c/kM_R01529_C00199_c)*(1 + C00231_c/kM_R01529_C00231_c));  // modifiers: enzyme_R01529_c; kegg.reaction:R01529
    kf_R01529 = 0.1667884; kb_R01529 = 0.1283284; kM_R01529_C00199_c = 1; kM_R01529_C00231_c = 1;
  R01600: C00002_c + C00221_c -> C00008_c + C01172_c; enzyme_R01600_c*(kf_R01600*(C00002_c/kM_R01600_C00002_c)*(C00221_c/kM_R01600_C00221_c) - kb_R01600*(C00008_c/kM_R01600_C00008_c)*(C01172_c/kM_R01600_C01172_c))/((1 + C00002_c/kM_R01600_C00002_c)*(1 + C00221_c/kM_R01600_C00221_c)*(1 + C00008_c/kM_R01600_C00008_c)*(1 + C01172_c/kM_R01600_C01172_c));  // modifiers: enzyme_R01600_c; kegg.reaction:R01600
    kf_R01600 = 2.200285; kb_R01600 = 1.692917; kM_R01600_C00002_c = 1; kM_R01600_C00221_c = 1; kM_R01600_C00008_c = 1; kM_R01600_C01172_c = 1;
  R01641: C05382_c + C00118_c -> C00117_c + C00231_c; enzyme_R01641_c*(kf_R01641*(C05382_c/kM_R01641_C05382_c)*(C00118_c/kM_R01641_C00118_c) - kb_R01641*(C00117_c/kM_R01641_C00117_c)*(C00231_c/kM_R01641_C00231_c))/((1 + C05382_c/kM_R01641_C05382_c)*(1 + C00118_c/kM_R01641_C00118_c)*(1 + C00117_c/kM_R01641_C00117_c)*(1 + C00231_c/kM_R01641_C00231_c));  // modifiers: enzyme_R01641_c; kegg.reaction:R01641
    kf_R01641 = 0.3597211; kb_R01641 = 0.4675345; kM_R01641_C05382_c = 1; kM_R01641_C00118_c = 1; kM_R01641_C00117_c = 1; kM_R01641_C00231_c = 1;
  R01698: $C00579_c + C00003_c -> $C00248_c + C00004_c + $C00080_c; enzyme_R01698_c*(kf_R01698*(C00579_c/kM_R01698_C00579_c)*(C00003_c/kM_R01698_C00003_c) - kb_R01698*(C00248_c/kM_R01698_C00248_c)*(C00004_c/kM_R01698_C00004_c)*(C00080_c/kM_R01698_C00080_c))/((1 + C00579_c/kM_R01698_C00579_c)*(1 + C00003_c/kM_R01698_C00003_c)*(1 + C00248_c/kM_R01698_C00248_c)*(1 + C00004_c/kM_R01698_C00004_c)*(1 + C00080_c/kM_R01698_C00080_c));  // modifiers: enzyme_R01698_c; kegg.reaction:R01698
    kf_R01698 = 2.643744; kb_R01698 = 3.436111; kM_R01698_C00579_c = 1; kM_R01698_C00003_c = 1; kM_R01698_C00248_c = 1; kM_R01698_C00004_c = 1; kM_R01698_C00080_c = 1;
  R01827: C05382_c + C00118_c -> C00279_c + C00085_c; enzyme_R01827_c*(kf_R01827*(C05382_c/kM_R01827_C05382_c)*(C00118_c/kM_R01827_C00118_c) - kb_R01827*(C00279_c/kM_R01827_C00279_c)*(C00085_c/kM_R01827_C00085_c))/((1 + C05382_c/kM_R01827_C05382_c)*(1 + C00118_c/kM_R01827_C00118_c)*(1 + C00279_c/kM_R01827_C00279_c)*(1 + C00085_c/kM_R01827_C00085_c));  // modifiers: enzyme_R01827_c; kegg.reaction:R01827
    kf_R01827 = 0.233709; kb_R01827 = 0.1798176; kM_R01827_C05382_c = 1; kM_R01827_C00118_c = 1; kM_R01827_C00279_c = 1; kM_R01827_C00085_c = 1;
  R01830: C00085_c + C00118_c -> C00279_c + C00231_c; enzyme_R01830_c*(kf_R01830*(C00085_c/kM_R01830_C00085_c)*(C00118_c/kM_R01830_C00118_c) - kb_R01830*(C00279_c/kM_R01830_C00279_c)*(C00231_c/kM_R01830_C00231_c))/((1 + C00085_c/kM_R01830_C00085_c)*(1 + C00118_c/kM_R01830_C00118_c)*(1 + C00279_c/kM_R01830_C00279_c)*(1 + C00231_c/kM_R01830_C00231_c));  // modifiers: enzyme_R01830_c; kegg.reaction:R01830 kegg.reaction:R01067
    kf_R01830 = 0.2418452; kb_R01830 = 0.3120181; kM_R01830_C00085_c = 1; kM_R01830_C00118_c = 1; kM_R01830_C00279_c = 1; kM_R01830_C00231_c = 1;
  R01899: C00311_c + C00006_c -> C05379_c + C00005_c + $C00080_c; enzyme_R01899_c*(kf_R01899*(C00311_c/kM_R01899_C00311_c)*(C00006_c/kM_R01899_C00006_c) - kb_R01899*(C05379_c/kM_R01899_C05379_c)*(C00005_c/kM_R01899_C00005_c)*(C00080_c/kM_R01899_C00080_c))/((1 + C00311_c/kM_R01899_C00311_c)*(1 + C00006_c/kM_R01899_C00006_c)*(1 + C05379_c/kM_R01899_C05379_c)*(1 + C00005_c/kM_R01899_C00005_c)*(1 + C00080_c/kM_R01899_C00080_c));  // modifiers: enzyme_R01899_c; kegg.reaction:R01899
    kf_R01899 = 13.01787; kb_R01899 = 11.84196; kM_R01899_C00311_c = 1; kM_R01899_C00006_c = 1; kM_R01899_C05379_c = 1; kM_R01899_C00005_c = 1; kM_R01899_C00080_c = 1;
  R01900: C00311_c -> C00417_c + $C00001_c; enzyme_R01900_c*(kf_R01900*(C00311_c/kM_R01900_C00311_c) - kb_R01900*(C00417_c/kM_R01900_C00417_c)*(C00001_c/kM_R01900_C00001_c))/((1 + C00311_c/kM_R01900_C00311_c)*(1 + C00417_c/kM_R01900_C00417_c)*(1 + C00001_c/kM_R01900_C00001_c));  // modifiers: enzyme_R01900_c; kegg.reaction:R01900
    kf_R01900 = 0.8343494; kb_R01900 = 1.084416; kM_R01900_C00311_c = 1; kM_R01900_C00417_c = 1; kM_R01900_C00001_c = 1;
  R02035: C01236_c + $C00001_c -> C00345_c; enzyme_R02035_c*(kf_R02035*(C01236_c/kM_R02035_C01236_c)*(C00001_c/kM_R02035_C00001_c) - kb_R02035*(C00345_c/kM_R02035_C00345_c))/((1 + C01236_c/kM_R02035_C01236_c)*(1 + C00001_c/kM_R02035_C00001_c)*(1 + C00345_c/kM_R02035_C00345_c));  // modifiers: enzyme_R02035_c; kegg.reaction:R02035
    kf_R02035 = 0.5009353; kb_R02035 = 0.3854238; kM_R02035_C01236_c = 1; kM_R02035_C00001_c = 1; kM_R02035_C00345_c = 1;
  R00412: C00042_c + C00028_c -> C00122_c + C00030_c; enzyme_R00412_c*(kf_R00412*(C00042_c/kM_R00412_C00042_c)*(C00028_c/kM_R00412_C00028_c) - kb_R00412*(C00122_c/kM_R00412_C00122_c)*(C00030_c/kM_R00412_C00030_c))/((1 + C00042_c/kM_R00412_C00042_c)*(1 + C00028_c/kM_R00412_C00028_c)*(1 + C00122_c/kM_R00412_C00122_c)*(1 + C00030_c/kM_R00412_C00030_c));  // modifiers: enzyme_R00412_c; kegg.reaction:R00412
    kf_R00412 = 1.448198; kb_R00412 = 1.114255; kM_R00412_C00042_c = 1; kM_R00412_C00028_c = 1; kM_R00412_C00122_c = 1; kM_R00412_C00030_c = 1;
  R02569: C00024_c + $C15973_c -> $C00010_c + C16255_c; enzyme_R02569_c*(kf_R02569*(C00024_c/kM_R02569_C00024_c)*(C15973_c/kM_R02569_C15973_c) - kb_R02569*(C00010_c/kM_R02569_C00010_c)*(C16255_c/kM_R02569_C16255_c))/((1 + C00024_c/kM_R02569_C00024_c)*(1 + C15973_c/kM_R02569_C15973_c)*(1 + C00010_c/kM_R02569_C00010_c)*(1 + C16255_c/kM_R02569_C16255_c));  // modifiers: enzyme_R02569_c; kegg.reaction:R02569
    kf_R02569 = 1.062226; kb_R02569 = 1.429837; kM_R02569_C00024_c = 1; kM_R02569_C15973_c = 1; kM_R02569_C00010_c = 1; kM_R02569_C16255_c = 1;
  R02570: C00091_c + $C15973_c -> $C00010_c + C16254_c; enzyme_R02570_c*(kf_R02570*(C00091_c/kM_R02570_C00091_c)*(C15973_c/kM_R02570_C15973_c) - kb_R02570*(C00010_c/kM_R02570_C00010_c)*(C16254_c/kM_R02570_C16254_c))/((1 + C00091_c/kM_R02570_C00091_c)*(1 + C15973_c/kM_R02570_C15973_c)*(1 + C00010_c/kM_R02570_C00010_c)*(1 + C16254_c/kM_R02570_C16254_c));  // modifiers: enzyme_R02570_c; kegg.reaction:R02570
    kf_R02570 = 1.817966; kb_R02570 = 2.264531; kM_R02570_C00091_c = 1; kM_R02570_C15973_c = 1; kM_R02570_C00010_c = 1; kM_R02570_C16254_c = 1;
  R02736: C01172_c + C00006_c -> C01236_c + C00005_c + $C00080_c; enzyme_R02736_c*(kf_R02736*(C01172_c/kM_R02736_C01172_c)*(C00006_c/kM_R02736_C00006_c) - kb_R02736*(C01236_c/kM_R02736_C01236_c)*(C00005_c/kM_R02736_C00005_c)*(C00080_c/kM_R02736_C00080_c))/((1 + C01172_c/kM_R02736_C01172_c)*(1 + C00006_c/kM_R02736_C00006_c)*(1 + C01236_c/kM_R02736_C01236_c)*(1 + C00005_c/kM_R02736_C00005_c)*(1 + C00080_c/kM_R02736_C00080_c));  // modifiers: enzyme_R02736_c; kegg.reaction:R02736
    kf_R02736 = 2.203819; kb_R02736 = 1.695637; kM_R02736_C01172_c = 1; kM_R02736_C00006_c = 1; kM_R02736_C01236_c = 1; kM_R02736_C00005_c = 1; kM_R02736_C00080_c = 1;
  R03270: C05125_c + $C15972_c -> C16255_c + $C00068_c; enzyme_R03270_c*(kf_R03270*(C05125_c/kM_R03270_C05125_c)*(C15972_c/kM_R03270_C15972_c) - kb_R03270*(C16255_c/kM_R03270_C16255_c)*(C00068_c/kM_R03270_C00068_c))/((1 + C05125_c/kM_R03270_C05125_c)*(1 + C15972_c/kM_R03270_C15972_c)*(1 + C16255_c/kM_R03270_C16255_c)*(1 + C00068_c/kM_R03270_C00068_c));  // modifiers: enzyme_R03270_c; kegg.reaction:R03270
    kf_R03270 = 1.42985; kb_R03270 = 1.062216; kM_R03270_C05125_c = 1; kM_R03270_C15972_c = 1; kM_R03270_C16255_c = 1; kM_R03270_C00068_c = 1;
  R03316: C05381_c + $C15972_c -> C16254_c + $C00068_c; enzyme_R03316_c*(kf_R03316*(C05381_c/kM_R03316_C05381_c)*(C15972_c/kM_R03316_C15972_c) - kb_R03316*(C16254_c/kM_R03316_C16254_c)*(C00068_c/kM_R03316_C00068_c))/((1 + C05381_c/kM_R03316_C05381_c)*(1 + C15972_c/kM_R03316_C15972_c)*(1 + C16254_c/kM_R03316_C16254_c)*(1 + C00068_c/kM_R03316_C00068_c));  // modifiers: enzyme_R03316_c; kegg.reaction:R03316
    kf_R03316 = 2.264586; kb_R03316 = 1.817922; kM_R03316_C05381_c = 1; kM_R03316_C15972_c = 1; kM_R03316_C16254_c = 1; kM_R03316_C00068_c = 1;
  R03321: C01172_c -> C00085_c; enzyme_R03321_c*(kf_R03321*(C01172_c/kM_R03321_C01172_c) - kb_R03321*(C00085_c/kM_R03321_C00085_c))/((1 + C01172_c/kM_R03321_C01172_c)*(1 + C00085_c/kM_R03321_C00085_c));  // modifiers: enzyme_R03321_c; kegg.reaction:R03321
    kf_R03321 = 0.5382147; kb_R03321 = 0.4141069; kM_R03321_C01172_c = 1; kM_R03321_C00085_c = 1;
  R04779: C00002_c + C00085_c -> C00008_c + C05378_c; enzyme_R04779_c*(kf_R04779*(C00002_c/kM_R04779_C00002_c)*(C00085_c/kM_R04779_C00085_c) - kb_R04779*(C00008_c/kM_R04779_C00008_c)*(C05378_c/kM_R04779_C05378_c))/((1 + C00002_c/kM_R04779_C00002_c)*(1 + C00085_c/kM_R04779_C00085_c)*(1 + C00008_c/kM_R04779_C00008_c)*(1 + C05378_c/kM_R04779_C05378_c));  // modifiers: enzyme_R04779_c; kegg.reaction:R04779
    kf_R04779 = 38.77431; kb_R04779 = 31.12652; kM_R04779_C00002_c = 1; kM_R04779_C00085_c = 1; kM_R04779_C00008_c = 1; kM_R04779_C05378_c = 1;
  R04780: C05378_c + $C00001_c -> C00085_c + $C00009_c; enzyme_R04780_c*(kf_R04780*(C05378_c/kM_R04780_C05378_c)*(C00001_c/kM_R04780_C00001_c) - kb_R04780*(C00085_c/kM_R04780_C00085_c)*(C00009_c/kM_R04780_C00009_c))/((1 + C05378_c/kM_R04780_C05378_c)*(1 + C00001_c/kM_R04780_C00001_c)*(1 + C00085_c/kM_R04780_C00085_c)*(1 + C00009_c/kM_R04780_C00009_c));  // modifiers: enzyme_R04780_c; kegg.reaction:R04780
    kf_R04780 = 0.2974474; kb_R04780 = 0.4003868; kM_R04780_C05378_c = 1; kM_R04780_C00001_c = 1; kM_R04780_C00085_c = 1; kM_R04780_C00009_c = 1;
  R00710: C00084_c + C00003_c + $C00001_c -> C00033_c + C00004_c + $C00080_c; enzyme_R00710_c*(kf_R00710*(C00084_c/kM_R00710_C00084_c)*(C00003_c/kM_R00710_C00003_c)*(C00001_c/kM_R00710_C00001_c) - kb_R00710*(C00033_c/kM_R00710_C00033_c)*(C00004_c/kM_R00710_C00004_c)*(C00080_c/kM_R00710_C00080_c))/((1 + C00084_c/kM_R00710_C00084_c)*(1 + C00003_c/kM_R00710_C00003_c)*(1 + C00001_c/kM_R00710_C00001_c)*(1 + C00033_c/kM_R00710_C00033_c)*(1 + C00004_c/kM_R00710_C00004_c)*(1 + C00080_c/kM_R00710_C00080_c));  // modifiers: enzyme_R00710_c; kegg.reaction:R00710
    kf_R00710 = 2.255375; kb_R00710 = 2.051646; kM_R00710_C00084_c = 1; kM_R00710_C00003_c = 1; kM_R00710_C00001_c = 1; kM_R00710_C00033_c = 1; kM_R00710_C00004_c = 1; kM_R00710_C00080_c = 1;
  R00711: C00084_c + C00006_c + $C00001_c -> C00033_c + C00005_c + $C00080_c; enzyme_R00711_c*(kf_R00711*(C00084_c/kM_R00711_C00084_c)*(C00006_c/kM_R00711_C00006_c)*(C00001_c/kM_R00711_C00001_c) - kb_R00711*(C00033_c/kM_R00711_C00033_c)*(C00005_c/kM_R00711_C00005_c)*(C00080_c/kM_R00711_C00080_c))/((1 + C00084_c/kM_R00711_C00084_c)*(1 + C00006_c/kM_R00711_C00006_c)*(1 + C00001_c/kM_R00711_C00001_c)*(1 + C00033_c/kM_R00711_C00033_c)*(1 + C00005_c/kM_R00711_C00005_c)*(1 + C00080_c/kM_R00711_C00080_c));  // modifiers: enzyme_R00711_c; kegg.reaction:R00711
    kf_R00711 = 0.5784901; kb_R00711 = 0.6314704; kM_R00711_C00084_c = 1; kM_R00711_C00006_c = 1; kM_R00711_C00001_c = 1; kM_R00711_C00033_c = 1; kM_R00711_C00005_c = 1; kM_R00711_C00080_c = 1;
  R00243: $C00025_c + C00003_c + $C00001_c -> C00026_c + $C00014_c + C00004_c + $C00080_c; enzyme_R00243_c*(kf_R00243*(C00025_c/kM_R00243_C00025_c)*(C00003_c/kM_R00243_C00003_c)*(C00001_c/kM_R00243_C00001_c) - kb_R00243*(C00026_c/kM_R00243_C00026_c)*(C00014_c/kM_R00243_C00014_c)*(C00004_c/kM_R00243_C00004_c)*(C00080_c/kM_R00243_C00080_c))/((1 + C00025_c/kM_R00243_C00025_c)*(1 + C00003_c/kM_R00243_C00003_c)*(1 + C00001_c/kM_R00243_C00001_c)*(1 + C00026_c/kM_R00243_C00026_c)*(1 + C00014_c/kM_R00243_C00014_c)*(1 + C00004_c/kM_R00243_C00004_c)*(1 + C00080_c/kM_R00243_C00080_c));  // modifiers: enzyme_R00243_c; kegg.reaction:R00243
    kf_R00243 = 0.5768622; kb_R00243 = 0.4438426; kM_R00243_C00025_c = 1; kM_R00243_C00003_c = 1; kM_R00243_C00001_c = 1; kM_R00243_C00026_c = 1; kM_R00243_C00014_c = 1; kM_R00243_C00004_c = 1; kM_R00243_C00080_c = 1;
  Glycerolext_Glycerol: $Glycerolext_ext -> C00116_c; enzyme_reaction_0_c*(kf_reaction_0*(Glycerolext_ext/kM_reaction_0_Glycerolext_ext) - kb_reaction_0*(C00116_c/kM_reaction_0_C00116_c))/((1 + Glycerolext_ext/kM_reaction_0_Glycerolext_ext)*(1 + C00116_c/kM_reaction_0_C00116_c)); Glycerolext_Glycerol is "Glycerolext<=>Glycerol";  // modifiers: enzyme_reaction_0_c
    kf_reaction_0 = 0.004298057; kb_reaction_0 = 0.005586245; kM_reaction_0_Glycerolext_ext = 1; kM_reaction_0_C00116_c = 1;
  Ethanolext_Ethanol: $Ethanolext_ext -> C00469_c; enzyme_reaction_1_c*(kf_reaction_1*(Ethanolext_ext/kM_reaction_1_Ethanolext_ext) - kb_reaction_1*(C00469_c/kM_reaction_1_C00469_c))/((1 + Ethanolext_ext/kM_reaction_1_Ethanolext_ext)*(1 + C00469_c/kM_reaction_1_C00469_c)); Ethanolext_Ethanol is "Ethanolext<=>Ethanol";  // modifiers: enzyme_reaction_1_c
    kf_reaction_1 = 0.03991053; kb_reaction_1 = 0.05187228; kM_reaction_1_Ethanolext_ext = 1; kM_reaction_1_C00469_c = 1;
  beta_D_Glucoseext_beta_D_Glucose: $beta_D_Glucoseext_ext -> C00221_c; enzyme_reaction_2_c*(kf_reaction_2*(beta_D_Glucoseext_ext/kM_reaction_2_beta_D_Glucoseext_ext) - kb_reaction_2*(C00221_c/kM_reaction_2_C00221_c))/((1 + beta_D_Glucoseext_ext/kM_reaction_2_beta_D_Glucoseext_ext)*(1 + C00221_c/kM_reaction_2_C00221_c)); beta_D_Glucoseext_beta_D_Glucose is "beta_D_Glucoseext<=>beta_D_Glucose";  // modifiers: enzyme_reaction_2_c
    kf_reaction_2 = 21.85152; kb_reaction_2 = 21.63303; kM_reaction_2_beta_D_Glucoseext_ext = 1; kM_reaction_2_C00221_c = 1;
  Acetateext_Acetate: $Acetateext_ext -> C00033_c; enzyme_reaction_3_c*(kf_reaction_3*(Acetateext_ext/kM_reaction_3_Acetateext_ext) - kb_reaction_3*(C00033_c/kM_reaction_3_C00033_c))/((1 + Acetateext_ext/kM_reaction_3_Acetateext_ext)*(1 + C00033_c/kM_reaction_3_C00033_c)); Acetateext_Acetate is "Acetateext<=>Acetate";  // modifiers: enzyme_reaction_3_c
    kf_reaction_3 = 0.03263015; kb_reaction_3 = 0.04240986; kM_reaction_3_Acetateext_ext = 1; kM_reaction_3_C00033_c = 1;
  ADPplusGTP_ATPplusGDP: C00008_c + C00044_c -> C00002_c + C00035_c; enzyme_reaction_4_c*(kf_reaction_4*(C00008_c/kM_reaction_4_C00008_c)*(C00044_c/kM_reaction_4_C00044_c) - kb_reaction_4*(C00002_c/kM_reaction_4_C00002_c)*(C00035_c/kM_reaction_4_C00035_c))/((1 + C00008_c/kM_reaction_4_C00008_c)*(1 + C00044_c/kM_reaction_4_C00044_c)*(1 + C00002_c/kM_reaction_4_C00002_c)*(1 + C00035_c/kM_reaction_4_C00035_c)); ADPplusGTP_ATPplusGDP is "ADPplusGTP<=>ATPplusGDP";  // modifiers: enzyme_reaction_4_c; kegg.reaction:R00330
    kf_reaction_4 = 2.837025; kb_reaction_4 = 2.390482; kM_reaction_4_C00008_c = 1; kM_reaction_4_C00044_c = 1; kM_reaction_4_C00002_c = 1; kM_reaction_4_C00035_c = 1;
  reaction_5: C00008_c + C00030_c + 0.5 $O2_c -> C00002_c + $C00001_c + C00028_c; enzyme_reaction_5_c*(kf_reaction_5*(C00008_c/kM_reaction_5_C00008_c)*(C00030_c/kM_reaction_5_C00030_c)*(O2_c/kM_reaction_5_O2_c)^0.5 - kb_reaction_5*(C00002_c/kM_reaction_5_C00002_c)*(C00001_c/kM_reaction_5_C00001_c)*(C00028_c/kM_reaction_5_C00028_c))/((1 + C00008_c/kM_reaction_5_C00008_c)*(1 + C00030_c/kM_reaction_5_C00030_c)*(1 + O2_c/kM_reaction_5_O2_c)^0.5*(1 + C00002_c/kM_reaction_5_C00002_c)*(1 + C00001_c/kM_reaction_5_C00001_c)*(1 + C00028_c/kM_reaction_5_C00028_c)); reaction_5 is "ADPplusC00030plus0_50O2<=>ATPplusH2OplusC00028";  // modifiers: enzyme_reaction_5_c
    kf_reaction_5 = 2.618567; kb_reaction_5 = 2.014747; kM_reaction_5_C00008_c = 1; kM_reaction_5_C00030_c = 1; kM_reaction_5_O2_c = 1; kM_reaction_5_C00002_c = 1; kM_reaction_5_C00001_c = 1; kM_reaction_5_C00028_c = 1;
  reaction_6: C00008_c + C00004_c + 0.5 $O2_c -> C00002_c + C00003_c + $C00001_c; enzyme_reaction_6_c*(kf_reaction_6*(C00008_c/kM_reaction_6_C00008_c)*(C00004_c/kM_reaction_6_C00004_c)*(O2_c/kM_reaction_6_O2_c)^0.5 - kb_reaction_6*(C00002_c/kM_reaction_6_C00002_c)*(C00003_c/kM_reaction_6_C00003_c)*(C00001_c/kM_reaction_6_C00001_c))/((1 + C00008_c/kM_reaction_6_C00008_c)*(1 + C00004_c/kM_reaction_6_C00004_c)*(1 + O2_c/kM_reaction_6_O2_c)^0.5*(1 + C00002_c/kM_reaction_6_C00002_c)*(1 + C00003_c/kM_reaction_6_C00003_c)*(1 + C00001_c/kM_reaction_6_C00001_c)); reaction_6 is "ADPplusNADHplus0_50O2<=>ATPplusNADplusplusH2O";  // modifiers: enzyme_reaction_6_c
    kf_reaction_6 = 5.404378; kb_reaction_6 = 4.158173; kM_reaction_6_C00008_c = 1; kM_reaction_6_C00004_c = 1; kM_reaction_6_O2_c = 1; kM_reaction_6_C00002_c = 1; kM_reaction_6_C00003_c = 1; kM_reaction_6_C00001_c = 1;
  ATP_ADP: C00002_c -> C00008_c; enzyme_reaction_7_c*(kf_reaction_7*(C00002_c/kM_reaction_7_C00002_c) - kb_reaction_7*(C00008_c/kM_reaction_7_C00008_c))/((1 + C00002_c/kM_reaction_7_C00002_c)*(1 + C00008_c/kM_reaction_7_C00008_c)); ATP_ADP is "ATP<=>ADP";  // modifiers: enzyme_reaction_7_c
    kf_reaction_7 = 0.4207228; kb_reaction_7 = 0.2817592; kM_reaction_7_C00002_c = 1; kM_reaction_7_C00008_c = 1;
  reaction_8: 0.03 C00022_c + 0.01 $C00011_c + 0.81 C00002_c + 0.02 C00074_c + 0.03 C00026_c + 0.02 C00036_c + 0.08 C00003_c + 0.07 C00024_c + 0.02 C00118_c + 0.01 C00117_c + 0.02 C00085_c + 0.01 C00279_c + 0.36 C00005_c + 0.03 C01172_c + 0.01 $O2_c -> 0.81 C00008_c + 0.08 C00004_c + 0.36 C00006_c + $Biomass_c; enzyme_reaction_8_c*(kf_reaction_8*(C00022_c/kM_reaction_8_C00022_c)*(C00011_c/kM_reaction_8_C00011_c)*(C00002_c/kM_reaction_8_C00002_c)*(C00074_c/kM_reaction_8_C00074_c)*(C00026_c/kM_reaction_8_C00026_c)*(C00036_c/kM_reaction_8_C00036_c)*(C00003_c/kM_reaction_8_C00003_c)*(C00024_c/kM_reaction_8_C00024_c)*(C00118_c/kM_reaction_8_C00118_c)*(C00117_c/kM_reaction_8_C00117_c)*(C00085_c/kM_reaction_8_C00085_c)*(C00279_c/kM_reaction_8_C00279_c)*(C00005_c/kM_reaction_8_C00005_c)*(C01172_c/kM_reaction_8_C01172_c)*(O2_c/kM_reaction_8_O2_c) - kb_reaction_8*(C00008_c/kM_reaction_8_C00008_c)*(C00004_c/kM_reaction_8_C00004_c)*(C00006_c/kM_reaction_8_C00006_c)*(Biomass_c/kM_reaction_8_Biomass_c))/((1 + C00022_c/kM_reaction_8_C00022_c)*(1 + C00011_c/kM_reaction_8_C00011_c)*(1 + C00002_c/kM_reaction_8_C00002_c)*(1 + C00074_c/kM_reaction_8_C00074_c)*(1 + C00026_c/kM_reaction_8_C00026_c)*(1 + C00036_c/kM_reaction_8_C00036_c)*(1 + C00003_c/kM_reaction_8_C00003_c)*(1 + C00024_c/kM_reaction_8_C00024_c)*(1 + C00118_c/kM_reaction_8_C00118_c)*(1 + C00117_c/kM_reaction_8_C00117_c)*(1 + C00085_c/kM_reaction_8_C00085_c)*(1 + C00279_c/kM_reaction_8_C00279_c)*(1 + C00005_c/kM_reaction_8_C00005_c)*(1 + C01172_c/kM_reaction_8_C01172_c)*(1 + O2_c/kM_reaction_8_O2_c)*(1 + C00008_c/kM_reaction_8_C00008_c)*(1 + C00004_c/kM_reaction_8_C00004_c)*(1 + C00006_c/kM_reaction_8_C00006_c)*(1 + Biomass_c/kM_reaction_8_Biomass_c)); reaction_8 is "_0_03Pyruvateplus0_01CO2plus0_81ATPplus0_02Phosphoenolpyruvateplus0_032_Oxoglutarateplus0_02Oxaloacetateplus0_08NADplusplus0_07Acetyl_CoAplus0_02D_Glyceraldehyde3_phosphateplus0_01D_Ribose5_phosphateplus0_02D_Fructose6_phosphateplus0_01D_Erythrose4_phosphateplus0_36NADPHplus0_03beta_D_Glucose6_phosphateplus0_01O2<=>0_81ADPplus0_08NADHplus0_36NADPplusplusBiomass";  // modifiers: enzyme_reaction_8_c
    kf_reaction_8 = 7.693016; kb_reaction_8 = 5.919071; kM_reaction_8_C00022_c = 1; kM_reaction_8_C00011_c = 1; kM_reaction_8_C00002_c = 1; kM_reaction_8_C00074_c = 1; kM_reaction_8_C00026_c = 1; kM_reaction_8_C00036_c = 1; kM_reaction_8_C00003_c = 1; kM_reaction_8_C00024_c = 1; kM_reaction_8_C00118_c = 1; kM_reaction_8_C00117_c = 1; kM_reaction_8_C00085_c = 1; kM_reaction_8_C00279_c = 1; kM_reaction_8_C00005_c = 1; kM_reaction_8_C01172_c = 1; kM_reaction_8_O2_c = 1; kM_reaction_8_C00008_c = 1; kM_reaction_8_C00004_c = 1; kM_reaction_8_C00006_c = 1; kM_reaction_8_Biomass_c = 1;
end
